# OpenSim document version 40000
# Taken from https://simtk.org/frs/?group_id=1018.
Model RunningModelForMotionsInAllDirections:
  gravity: 0 -9.80665 0
  length_units: meters
  force_units: N
  credits:
    Delp S.L., Loan J.P., Hoy M.G., Zajac F.E., Topp E.L., Rosen J.M., Thelen D.G., Anderson F.C., Seth A., Hamner S.R.
  publications:
    Notes: Model extension presented in "Efficient trajectory optimization for curved running using a 3D musculoskeletal model with implicit dynamics" (Scientific Reports, 2020) based on the 3D, 23 DOF gait model created by D.G. Thelen, Univ. of Wisconsin-Madison, and Samuel Hamner, Ajay Seth, Frank C. Anderson, and Scott L. Delp, Stanford University. Lower extremity joint defintions based on Delp et al. (1990). Low back joint and anthropometry based on Anderson and Pandy (1999, 2001). Planar knee model of Yamaguchi and Zajac (1989). Seth removed the patella to avoid kinematic constraints; insertions of the quadrucepts are handled with moving points in the tibia frame. Hamner added arms adapted from Holzbaur et al., 2005. Hamner, S.R., Seth, A, Delp, S.L.: Muscle contributions to propulsion and support during running. Journal of Biomechanics, 2010. Delp, S.L., Loan, J.P., Hoy, M.G., Zajac, F.E., Topp E.L., Rosen, J.M.: An interactive graphics-based model of the lower extremity to study orthopaedic surgical procedures, IEEE Transactions on Biomedical Engineering, vol. 37, pp. 757-767, 1990. Yamaguchi G.T., Zajac F.E.: A planar model of the knee joint to characterize the knee extensor mechanism." J . Biomech. vol. 21. pp. 1-10. 1989. Anderson F.C., Pandy M.G.: A dynamic optimization solution for vertical jumping in three dimensions. Computer Methods in Biomechanics and Biomedical Engineering 2:201-231, 1999. Anderson F.C., Pandy M.G.: Dynamic optimization of human walking. Journal of Biomechanical Engineering 123:381-390, 2001. Holzbaur, KR, WM Murray and SL Delp, 2005. A model of the upper extremity for simulating musculoskeletal surgery and analyzing neuromuscular control. Ann Biomed Eng 33(6): 829-840.
  defaults: Thelen2003Muscle default: max_isometric_force=546 optimal_fiber_length=0.0535 tendon_slack_length=0.078
      pennation_angle_at_optimal=0 [radians] FmaxTendonStrain=0.033 FmaxMuscleStrain=0.6 KshapeActive=0.5
      KshapePassive=4 Af=0.3 Flen=1.8 activation_time_constant=0.01 [seconds] deactivation_time_constant=0.04 [seconds]
  Ground: meshes=checkered_floor.vtp
  BodySet:
    Body pelvis: mass=14.41482 [kg] mass_center=(-0.0690557 0 0) inertia=(0.110357 0.110357 0.0676103 0 0 0)
        meshes=(sacrum.vtp pelvis.vtp l_pelvis.vtp)
    Body femur_r: mass=11.38473 mass_center=(0 -0.185041 0) inertia=(0.194174 0.0509001 0.20476 0 0 0)
        meshes=femur_r.vtp
    Body tibia_r: mass=4.537907 mass_center=(0 -0.221556 0) inertia=(0.0868731 0.00879073 0.0880797 0 0 0)
        meshes=(tibia_r.vtp fibula_r.vtp)
    Body talus_r: mass=0.122398 mass_center=(0 0 0) inertia=(0.00113222 0.00113222 0.00113222 0 0 0)
        meshes=talus_rv.vtp
    Body calcn_r: mass=1.529976 mass_center=(0.114424 0.0343273 0) inertia=(0.00224357 0.00624993 0.00657044 0 0 0)
        meshes=foot.vtp
    Body toes_r: mass=0.2651142 mass_center=(0.0307423 0.00533103 -0.0155488)
        inertia=(9.6626e-5 0.000193252 0.00096626 0 0 0) meshes=bofoot.vtp
    Body femur_l: mass=11.38473 mass_center=(0 -0.185041 0) inertia=(0.194174 0.0509001 0.20476 0 0 0)
        meshes=femur_l.vtp
    Body tibia_l: mass=4.537907 mass_center=(0 -0.221556 0) inertia=(0.0868731 0.00879073 0.0880797 0 0 0)
        meshes=(tibia_l.vtp fibula_l.vtp)
    Body talus_l: mass=0.122398 mass_center=(0 0 0) inertia=(0.00113222 0.00113222 0.00113222 0 0 0)
        meshes=talus_lv.vtp
    Body calcn_l: mass=1.529976 mass_center=(0.114424 0.0343273 0) inertia=(0.00224357 0.00624993 0.00657044 0 0 0)
        meshes=l_foot.vtp
    Body toes_l: mass=0.2651142 mass_center=(0.0307423 0.00533103 0.0155488)
        inertia=(9.6626e-5 0.000193252 0.00096626 0 0 0) meshes=l_bofoot.vtp
    Body torso: mass=32.83523 mass_center=(-0.0341844 0.364633 0) inertia=(2.34332 1.20066 2.27482 0 0 0)
        meshes=(hat_spine.vtp hat_jaw.vtp hat_skull.vtp hat_ribs_scap.vtp)
    Body humerus_r: mass=2.48774 mass_center=(0 -0.158566 0) inertia=(0.0135855 0.00468658 0.0152493 0 0 0)
        meshes=humerus_rv.vtp
    Body ulna_r: mass=0.7435681 mass_center=(0 -0.112384 0) inertia=(0.0031522 0.000657684 0.00341932 0 0 0)
        meshes=ulna_rv.vtp
    Body radius_r: mass=0.7435681 mass_center=(0 -0.112384 0) inertia=(0.0031522 0.000657684 0.00341932 0 0 0)
        meshes=radius_rv.vtp
    Body hand_r: mass=0.5599711 mass_center=(0 -0.100123 0) inertia=(0.00236036 0.00144744 0.00354583 0 0 0)
        meshes=(pisiform_rvs.vtp lunate_rvs.vtp scaphoid_rvs.vtp triquetrum_rvs.vtp hamate_rvs.vtp capitate_rvs.vtp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)
    Body humerus_l: mass=2.48774 mass_center=(0 -0.158566 0) inertia=(0.0135855 0.00468658 0.0152493 0 0 0)
        meshes=humerus_lv.vtp
    Body ulna_l: mass=0.7435681 mass_center=(0 -0.112384 0) inertia=(0.0031522 0.000657684 0.00341932 0 0 0)
        meshes=ulna_lv.vtp
    Body radius_l: mass=0.7435681 mass_center=(0 -0.112384 0) inertia=(0.0031522 0.000657684 0.00341932 0 0 0)
        meshes=radius_lv.vtp
    Body hand_l: mass=0.5599711 mass_center=(0 -0.100123 0) inertia=(0.00236036 0.00144744 0.00354583 0 0 0)
        meshes=(pisiform_lvs.vtp lunate_lvs.vtp scaphoid_lvs.vtp triquetrum_lvs.vtp hamate_lvs.vtp capitate_lvs.vtp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)
  JointSet:
    CustomJoint ground_pelvis: socket_parent_frame=ground_offset socket_child_frame=pelvis_offset
      Coordinate pelvis_rotation: default_value=0 range=(-1.570796 1.570796) clamped=true
      Coordinate pelvis_list: default_value=0 range=(-1.570796 1.570796) clamped=true
      Coordinate pelvis_tilt: default_value=0 range=(-1.570796 1.570796) clamped=true
      Coordinate pelvis_tx: default_value=0 range=(-5 7) clamped=true
      Coordinate pelvis_ty: default_value=1 range=(-1 2) clamped=true
      Coordinate pelvis_tz: default_value=0 range=(-3 3) clamped=true
      PhysicalOffsetFrame ground_offset: socket_parent=/ground translation=(0 0 0) [meters]
      PhysicalOffsetFrame pelvis_offset: socket_parent=/bodyset/pelvis translation=(0 0 0)
      SpatialTransform:
        TransformAxis rotation1: coordinates=pelvis_tilt axis=(0 1 0) LinearFunction(coefficients=1 0)
        TransformAxis rotation2: coordinates=pelvis_list axis=(1 0 0) LinearFunction(coefficients=1 0)
        TransformAxis rotation3: coordinates=pelvis_rotation axis=(0 0 1) LinearFunction(coefficients=1 0)
        TransformAxis translation1: coordinates=pelvis_tx axis=(1 0 0) LinearFunction(coefficients=1 0)
        TransformAxis translation2: coordinates=pelvis_ty axis=(0 1 0) LinearFunction(coefficients=1 0)
        TransformAxis translation3: coordinates=pelvis_tz axis=(0 0 1) LinearFunction(coefficients=1 0)
    CustomJoint hip_r: socket_parent_frame=pelvis_offset socket_child_frame=femur_r_offset
      Coordinate hip_flexion_r: default_value=0 range=(-2.094395 2.094395) clamped=true
      Coordinate hip_adduction_r: default_value=0 range=(-2.094395 2.094395) clamped=true
      Coordinate hip_rotation_r: default_value=0 range=(-2.094395 2.094395) clamped=true
      PhysicalOffsetFrame pelvis_offset: socket_parent=/bodyset/pelvis translation=(-0.0690557 -0.0645627 0.0768428)
      PhysicalOffsetFrame femur_r_offset: socket_parent=/bodyset/femur_r translation=(0 0 0)
      SpatialTransform: axes_held_at_zero=(translation1 translation2 translation3)
        TransformAxis rotation1: coordinates=hip_flexion_r axis=(0 0 1) LinearFunction(coefficients=1 0)
        TransformAxis rotation2: coordinates=hip_adduction_r axis=(1 0 0) LinearFunction(coefficients=1 0)
        TransformAxis rotation3: coordinates=hip_rotation_r axis=(0 1 0) LinearFunction(coefficients=1 0)
    CustomJoint knee_r: socket_parent_frame=femur_r_offset socket_child_frame=tibia_r_offset
      Coordinate knee_angle_r: default_value=0 range=(-2.792527 0.1745329) clamped=true
      PhysicalOffsetFrame femur_r_offset: socket_parent=/bodyset/femur_r translation=(0 0 0)
      PhysicalOffsetFrame tibia_r_offset: socket_parent=/bodyset/tibia_r translation=(0 0 0)
      SpatialTransform: axes_held_at_zero=(rotation2 rotation3 translation3)
        TransformAxis rotation1: coordinates=knee_angle_r axis=(0 0 1) LinearFunction(coefficients=1 0)
        TransformAxis translation1: coordinates=knee_angle_r axis=(1 0 0)
          MultiplierFunction: scale=1.088475
            SimmSpline: x=(-2.0944 -1.74533 -1.39626 -1.0472 -0.698132 -0.349066 -0.174533 0.197344 0.337395 0.490178 1.52146 2.0944)
                y=(-0.0032 0.00179 0.00411 0.0041 0.00212 -0.001 -0.0031 -0.005227 -0.005435 -0.005574 -0.005435 -0.00525)
        TransformAxis translation2: coordinates=knee_angle_r axis=(0 1 0)
          MultiplierFunction: scale=1.088475
            SimmSpline: x=(-2.0944 -1.22173 -0.523599 -0.349066 -0.174533 0.159149 2.0944)
                y=(-0.4226 -0.4082 -0.399 -0.3976 -0.3966 -0.395264 -0.396)
    CustomJoint ankle_r: socket_parent_frame=tibia_r_offset socket_child_frame=talus_r_offset
      Coordinate ankle_angle_r: default_value=0 range=(-1.570796 1.570796) clamped=true
      PhysicalOffsetFrame tibia_r_offset: socket_parent=/bodyset/tibia_r translation=(0 -0.51028 0)
      PhysicalOffsetFrame talus_r_offset: socket_parent=/bodyset/talus_r translation=(0 0 0)
      SpatialTransform: axes_held_at_zero=(rotation2 rotation3 translation1 translation2 translation3)
        TransformAxis rotation1: coordinates=ankle_angle_r axis=(-0.1050135 -0.1740224 0.9791263)
            LinearFunction(coefficients=1 0)
    CustomJoint subtalar_r: socket_parent_frame=talus_r_offset socket_child_frame=calcn_r_offset
      Coordinate subtalar_angle_r: default_value=0 range=(-1.570796 1.570796) clamped=true
      PhysicalOffsetFrame talus_r_offset: socket_parent=/bodyset/talus_r translation=(-0.0469063 -0.0403469 0.00761734)
      PhysicalOffsetFrame calcn_r_offset: socket_parent=/bodyset/calcn_r translation=(0 0 0)
      SpatialTransform: axes_held_at_zero=(rotation2 rotation3 translation1 translation2 translation3)
        TransformAxis rotation1: coordinates=subtalar_angle_r axis=(0.7871796 0.6047475 -0.1209495)
            LinearFunction(coefficients=1 0)
    CustomJoint mtp_r: socket_parent_frame=calcn_r_offset socket_child_frame=toes_r_offset
      Coordinate mtp_angle_r: default_value=0 range=(-1.570796 1.570796) clamped=true
      PhysicalOffsetFrame calcn_r_offset: socket_parent=/bodyset/calcn_r translation=(0.204591 -0.00228849 0.00123578)
      PhysicalOffsetFrame toes_r_offset: socket_parent=/bodyset/toes_r translation=(0 0 0)
      SpatialTransform: axes_held_at_zero=(rotation2 rotation3 translation1 translation2 translation3)
        TransformAxis rotation1: coordinates=mtp_angle_r axis=(-0.5809544 0 0.8139361) LinearFunction(coefficients=1 0)
    CustomJoint hip_l: socket_parent_frame=pelvis_offset socket_child_frame=femur_l_offset
      Coordinate hip_flexion_l: default_value=0 range=(-2.094395 2.094395) clamped=true
      Coordinate hip_adduction_l: default_value=0 range=(-2.094395 2.094395) clamped=true
      Coordinate hip_rotation_l: default_value=0 range=(-2.094395 2.094395) clamped=true
      PhysicalOffsetFrame pelvis_offset: socket_parent=/bodyset/pelvis translation=(-0.0690557 -0.0645627 -0.0768428)
      PhysicalOffsetFrame femur_l_offset: socket_parent=/bodyset/femur_l translation=(0 0 0)
      SpatialTransform: axes_held_at_zero=(translation1 translation2 translation3)
        TransformAxis rotation1: coordinates=hip_flexion_l axis=(0 0 1) LinearFunction(coefficients=1 0)
        TransformAxis rotation2: coordinates=hip_adduction_l axis=(-1 0 0) LinearFunction(coefficients=1 0)
        TransformAxis rotation3: coordinates=hip_rotation_l axis=(0 -1 0) LinearFunction(coefficients=1 0)
    CustomJoint knee_l: socket_parent_frame=femur_l_offset socket_child_frame=tibia_l_offset
      Coordinate knee_angle_l: default_value=0 range=(-2.792527 0.1745329) clamped=true
      PhysicalOffsetFrame femur_l_offset: socket_parent=/bodyset/femur_l translation=(0 0 0)
      PhysicalOffsetFrame tibia_l_offset: socket_parent=/bodyset/tibia_l translation=(0 0 0)
      SpatialTransform: axes_held_at_zero=(rotation2 rotation3 translation3)
        TransformAxis rotation1: coordinates=knee_angle_l axis=(0 0 1) LinearFunction(coefficients=1 0)
        TransformAxis translation1: coordinates=knee_angle_l axis=(1 0 0)
          MultiplierFunction: scale=1.088475
            SimmSpline: x=(-2.0944 -1.74533 -1.39626 -1.0472 -0.698132 -0.349066 -0.174533 0.197344 0.337395 0.490178 1.52146 2.0944)
                y=(-0.0032 0.00179 0.00411 0.0041 0.00212 -0.001 -0.0031 -0.005227 -0.005435 -0.005574 -0.005435 -0.00525)
        TransformAxis translation2: coordinates=knee_angle_l axis=(0 1 0)
          MultiplierFunction: scale=1.088475
            SimmSpline: x=(-2.0944 -1.22173 -0.523599 -0.349066 -0.174533 0.159149 2.0944)
                y=(-0.4226 -0.4082 -0.399 -0.3976 -0.3966 -0.395264 -0.396)
    CustomJoint ankle_l: socket_parent_frame=tibia_l_offset socket_child_frame=talus_l_offset
      Coordinate ankle_angle_l: default_value=0 range=(-1.570796 1.570796) clamped=true
      PhysicalOffsetFrame tibia_l_offset: socket_parent=/bodyset/tibia_l translation=(0 -0.51028 0)
      PhysicalOffsetFrame talus_l_offset: socket_parent=/bodyset/talus_l translation=(0 0 0)
      SpatialTransform: axes_held_at_zero=(rotation2 rotation3 translation1 translation2 translation3)
        TransformAxis rotation1: coordinates=ankle_angle_l axis=(0.1050135 0.1740224 0.9791263)
            LinearFunction(coefficients=1 0)
    CustomJoint subtalar_l: socket_parent_frame=talus_l_offset socket_child_frame=calcn_l_offset
      Coordinate subtalar_angle_l: default_value=0 range=(-1.570796 1.570796) clamped=true
      PhysicalOffsetFrame talus_l_offset: socket_parent=/bodyset/talus_l
          translation=(-0.0469063 -0.0403469 -0.00761734)
      PhysicalOffsetFrame calcn_l_offset: socket_parent=/bodyset/calcn_l translation=(0 0 0)
      SpatialTransform: axes_held_at_zero=(rotation2 rotation3 translation1 translation2 translation3)
        TransformAxis rotation1: coordinates=subtalar_angle_l axis=(-0.7871796 -0.6047475 -0.1209495)
            LinearFunction(coefficients=1 0)
    CustomJoint mtp_l: socket_parent_frame=calcn_l_offset socket_child_frame=toes_l_offset
      Coordinate mtp_angle_l: default_value=0 range=(-1.570796 1.570796) clamped=true
      PhysicalOffsetFrame calcn_l_offset: socket_parent=/bodyset/calcn_l translation=(0.204591 -0.00228849 -0.00123578)
      PhysicalOffsetFrame toes_l_offset: socket_parent=/bodyset/toes_l translation=(0 0 0)
      SpatialTransform: axes_held_at_zero=(rotation2 rotation3 translation1 translation2 translation3)
        TransformAxis rotation1: coordinates=mtp_angle_l axis=(0.5809544 0 0.8139361) LinearFunction(coefficients=1 0)
    CustomJoint back: socket_parent_frame=pelvis_offset socket_child_frame=torso_offset
      Coordinate lumbar_extension: default_value=0 range=(-1.570796 1.570796) clamped=true
      Coordinate lumbar_bending: default_value=0 range=(-1.570796 1.570796) clamped=true
      Coordinate lumbar_rotation: default_value=0 range=(-1.570796 1.570796) clamped=true
      PhysicalOffsetFrame pelvis_offset: socket_parent=/bodyset/pelvis translation=(-0.0983579 0.0796045 0)
      PhysicalOffsetFrame torso_offset: socket_parent=/bodyset/torso translation=(0 0 0)
      SpatialTransform: axes_held_at_zero=(translation1 translation2 translation3)
        TransformAxis rotation1: coordinates=lumbar_extension axis=(0 0 1) LinearFunction(coefficients=1 0)
        TransformAxis rotation2: coordinates=lumbar_bending axis=(1 0 0) LinearFunction(coefficients=1 0)
        TransformAxis rotation3: coordinates=lumbar_rotation axis=(0 1 0) LinearFunction(coefficients=1 0)
    CustomJoint acromial_r: socket_parent_frame=torso_offset socket_child_frame=humerus_r_offset
      Coordinate arm_flex_r: default_value=0 range=(-1.570796 1.570796) clamped=true
      Coordinate arm_add_r: default_value=0 range=(-2.094395 1.570796) clamped=true
      Coordinate arm_rot_r: default_value=0 range=(-1.570796 1.570796) clamped=true
      PhysicalOffsetFrame torso_offset: socket_parent=/bodyset/torso translation=(0.00359506 0.423316 0.193711)
      PhysicalOffsetFrame humerus_r_offset: socket_parent=/bodyset/humerus_r translation=(0 0 0)
      SpatialTransform: axes_held_at_zero=(translation1 translation2 translation3)
        TransformAxis rotation1: coordinates=arm_flex_r axis=(0 0 1) LinearFunction(coefficients=1 0)
        TransformAxis rotation2: coordinates=arm_add_r axis=(1 0 0) LinearFunction(coefficients=1 0)
        TransformAxis rotation3: coordinates=arm_rot_r axis=(0 1 0) LinearFunction(coefficients=1 0)
    CustomJoint elbow_r: socket_parent_frame=humerus_r_offset socket_child_frame=ulna_r_offset
      Coordinate elbow_flex_r: default_value=0.1 range=(0 2.618) clamped=true
      PhysicalOffsetFrame humerus_r_offset: socket_parent=/bodyset/humerus_r
          translation=(0.0126697 -0.275943 -0.00924878)
      PhysicalOffsetFrame ulna_r_offset: socket_parent=/bodyset/ulna_r translation=(0 0 0)
      SpatialTransform: axes_held_at_zero=(rotation2 rotation3 translation1 translation2 translation3)
        TransformAxis rotation1: coordinates=elbow_flex_r axis=(0.226047 0.022269 0.9738618)
            LinearFunction(coefficients=1 0)
    CustomJoint radioulnar_r: socket_parent_frame=ulna_r_offset socket_child_frame=radius_r_offset
      Coordinate pro_sup_r: default_value=1.5708 range=(0 2.618) clamped=true
      PhysicalOffsetFrame ulna_r_offset: socket_parent=/bodyset/ulna_r translation=(-0.00627261 -0.0121284 0.0243212)
      PhysicalOffsetFrame radius_r_offset: socket_parent=/bodyset/radius_r translation=(0 0 0)
      SpatialTransform: axes_held_at_zero=(rotation2 rotation3 translation1 translation2 translation3)
        TransformAxis rotation1: coordinates=pro_sup_r axis=(0.05639803 0.9984065 0.001952)
            LinearFunction(coefficients=1 0)
    CustomJoint radius_hand_r: socket_parent_frame=radius_r_offset socket_child_frame=hand_r_offset
      Coordinate wrist_flex_r: default_value=0 range=(-1.22173 1.22173) clamped=true
      Coordinate wrist_dev_r: default_value=0 range=(-0.4363323 0.6108652) clamped=true
      PhysicalOffsetFrame radius_r_offset: socket_parent=/bodyset/radius_r
          translation=(-0.00820279 -0.219911 0.0126907)
      PhysicalOffsetFrame hand_r_offset: socket_parent=/bodyset/hand_r translation=(0 0 0)
      SpatialTransform: axes_held_at_zero=(rotation3 translation1 translation2 translation3)
        TransformAxis rotation1: coordinates=wrist_flex_r axis=(0 0 1) LinearFunction(coefficients=1 0)
        TransformAxis rotation2: coordinates=wrist_dev_r axis=(1 0 0) LinearFunction(coefficients=1 0)
    CustomJoint acromial_l: socket_parent_frame=torso_offset socket_child_frame=humerus_l_offset
      Coordinate arm_flex_l: default_value=0 range=(-1.570796 1.570796) clamped=true
      Coordinate arm_add_l: default_value=0 range=(-2.094395 1.570796) clamped=true
      Coordinate arm_rot_l: default_value=0 range=(-1.570796 1.570796) clamped=true
      PhysicalOffsetFrame torso_offset: socket_parent=/bodyset/torso translation=(0.00359506 0.423316 -0.193711)
      PhysicalOffsetFrame humerus_l_offset: socket_parent=/bodyset/humerus_l translation=(0 0 0)
      SpatialTransform: axes_held_at_zero=(translation1 translation2 translation3)
        TransformAxis rotation1: coordinates=arm_flex_l axis=(0 0 1) LinearFunction(coefficients=1 0)
        TransformAxis rotation2: coordinates=arm_add_l axis=(-1 0 0) LinearFunction(coefficients=1 0)
        TransformAxis rotation3: coordinates=arm_rot_l axis=(0 -1 0) LinearFunction(coefficients=1 0)
    CustomJoint elbow_l: socket_parent_frame=humerus_l_offset socket_child_frame=ulna_l_offset
      Coordinate elbow_flex_l: default_value=0.1 range=(0 2.618) clamped=true
      PhysicalOffsetFrame humerus_l_offset: socket_parent=/bodyset/humerus_l
          translation=(0.0126697 -0.275943 0.00924878)
      PhysicalOffsetFrame ulna_l_offset: socket_parent=/bodyset/ulna_l translation=(0 0 0)
      SpatialTransform: axes_held_at_zero=(rotation2 rotation3 translation1 translation2 translation3)
        TransformAxis rotation1: coordinates=elbow_flex_l axis=(-0.226047 -0.022269 0.9738618)
            LinearFunction(coefficients=1 0)
    CustomJoint radioulnar_l: socket_parent_frame=ulna_l_offset socket_child_frame=radius_l_offset
      Coordinate pro_sup_l: default_value=1.5708 range=(0 2.618) clamped=true
      PhysicalOffsetFrame ulna_l_offset: socket_parent=/bodyset/ulna_l translation=(-0.00627261 -0.0121284 -0.0243212)
      PhysicalOffsetFrame radius_l_offset: socket_parent=/bodyset/radius_l translation=(0 0 0)
      SpatialTransform: axes_held_at_zero=(rotation2 rotation3 translation1 translation2 translation3)
        TransformAxis rotation1: coordinates=pro_sup_l axis=(-0.05639803 -0.9984065 0.001952)
            LinearFunction(coefficients=1 0)
    CustomJoint radius_hand_l: socket_parent_frame=radius_l_offset socket_child_frame=hand_l_offset
      Coordinate wrist_flex_l: default_value=0 range=(-1.22173 1.22173) clamped=true
      Coordinate wrist_dev_l: default_value=0 range=(-0.4363323 0.6108652) clamped=true
      PhysicalOffsetFrame radius_l_offset: socket_parent=/bodyset/radius_l
          translation=(-0.00820279 -0.219911 -0.0126907)
      PhysicalOffsetFrame hand_l_offset: socket_parent=/bodyset/hand_l translation=(0 0 0)
      SpatialTransform: axes_held_at_zero=(rotation3 translation1 translation2 translation3)
        TransformAxis rotation1: coordinates=wrist_flex_l axis=(0 0 1) LinearFunction(coefficients=1 0)
        TransformAxis rotation2: coordinates=wrist_dev_l axis=(-1 0 0) LinearFunction(coefficients=1 0)
  ForceSet:
    Thelen2003Muscle [values shared by the 92 below unless stated]: FmaxTendonStrain=0.033 FmaxMuscleStrain=0.6
        KshapeActive=0.5 KshapePassive=4 Af=0.3 Flen=1.8 activation_time_constant=0.01 deactivation_time_constant=0.04
    Thelen2003Muscle glut_med1_r: max_isometric_force=819 optimal_fiber_length=0.0538929 tendon_slack_length=0.07857282
        pennation_angle_at_optimal=0.1396263
      PathPoint P1: pelvis (-0.0398511 0.029693 0.111261)
      PathPoint P2: femur_r (-0.0237288 -0.0127352 0.0604104)
    Thelen2003Muscle glut_med2_r: max_isometric_force=573 optimal_fiber_length=0.08473686
        tendon_slack_length=0.05314856 pennation_angle_at_optimal=0
      PathPoint P1: pelvis (-0.0835115 0.043465 0.0704929)
      PathPoint P2: femur_r (-0.0280827 -0.00631315 0.0573626)
    Thelen2003Muscle glut_med3_r: max_isometric_force=653 optimal_fiber_length=0.06480935
        tendon_slack_length=0.05317176 pennation_angle_at_optimal=0.3316126
      PathPoint P1: pelvis (-0.119456 0.0102558 0.0596337)
      PathPoint P2: femur_r (-0.0336339 -0.00511583 0.056383)
    Thelen2003Muscle glut_min1_r: max_isometric_force=270 optimal_fiber_length=0.07019248
        tendon_slack_length=0.01651588 pennation_angle_at_optimal=0.1745329
      PathPoint P1: pelvis (-0.0456139 -0.00781394 0.0971808)
      PathPoint P2: femur_r (-0.00783702 -0.0113201 0.0609546)
    Thelen2003Muscle glut_min2_r: max_isometric_force=285 optimal_fiber_length=0.05800705
        tendon_slack_length=0.02693184 pennation_angle_at_optimal=0
      PathPoint P1: pelvis (-0.0618278 -0.00634882 0.091199)
      PathPoint P2: femur_r (-0.0104494 -0.0113201 0.0609546)
    Thelen2003Muscle glut_min3_r: max_isometric_force=323 optimal_fiber_length=0.0391911 tendon_slack_length=0.05259859
        pennation_angle_at_optimal=0.01745329
      PathPoint P1: pelvis (-0.0814603 -0.00615348 0.0787754)
      PathPoint P2: femur_r (-0.0146944 -0.00903434 0.0598661)
    Thelen2003Muscle semimem_r: max_isometric_force=1288 optimal_fiber_length=0.08869511 tendon_slack_length=0.3980193
        pennation_angle_at_optimal=0.2617994
      PathPoint P1: pelvis (-0.116428 -0.0952031 0.0658087)
      ConditionalPathPoint P2: tibia_r (-0.0412971 -0.0417599 -0.0224405)
          socket_coordinate=/jointset/knee_r/knee_angle_r range=(-0.558505 0.174533) [radians]
      PathPoint P3: tibia_r (-0.0320408 -0.0566174 -0.0232237)
    Thelen2003Muscle semiten_r: max_isometric_force=410 optimal_fiber_length=0.2256058 tendon_slack_length=0.2867775
        pennation_angle_at_optimal=0.08726646
      PathPoint P1: pelvis (-0.123411 -0.107324 0.0555753)
      ConditionalPathPoint P2: tibia_r (-0.0498769 -0.0339277 -0.0270211)
          socket_coordinate=/jointset/knee_r/knee_angle_r range=(-0.331613 0.174533)
      PathPoint P3: tibia_r (-0.0394221 -0.0626814 -0.0271516)
      PathPoint P4: tibia_r (-0.0134097 -0.0885277 -0.0290741)
      PathPoint P5: tibia_r (0.00320408 -0.113448 -0.0229033)
    Thelen2003Muscle bifemlh_r: max_isometric_force=896 optimal_fiber_length=0.1210809 tendon_slack_length=0.3621319
        pennation_angle_at_optimal=0
      PathPoint P1: pelvis (-0.12303 -0.100184 0.0639038)
      PathPoint P2: tibia_r (-0.0357196 -0.0427211 0.0349245)
      PathPoint P3: tibia_r (-0.0277687 -0.0668111 0.0407037)
    Thelen2003Muscle bifemsh_r: max_isometric_force=804 optimal_fiber_length=0.1927029 tendon_slack_length=0.09913619
        pennation_angle_at_optimal=0.4014257
      PathPoint P1: femur_r (0.00544237 -0.229777 0.0254703)
      PathPoint P2: tibia_r (-0.0357196 -0.0427211 0.0349245)
      PathPoint P3: tibia_r (-0.0277687 -0.0668111 0.0407037)
    Thelen2003Muscle sar_r: max_isometric_force=156 optimal_fiber_length=0.5663211 tendon_slack_length=0.1089079
        pennation_angle_at_optimal=0
      PathPoint P1: pelvis (-0.0149442 -0.00126976 0.114298)
      PathPoint P2: femur_r (-0.00326542 -0.388368 -0.0458248)
      PathPoint P3: tibia_r (-0.00664551 -0.0497226 -0.0473492)
      PathPoint P4: tibia_r (0.00712019 -0.0698965 -0.0454505)
      PathPoint P5: tibia_r (0.0288368 -0.0996826 -0.0299048)
    Thelen2003Muscle add_long_r: max_isometric_force=627 optimal_fiber_length=0.1480972 tendon_slack_length=0.1180485
        pennation_angle_at_optimal=0.1047198
      PathPoint P1: pelvis (-0.0308651 -0.0816556 0.0155526)
      PathPoint P2: femur_r (0.00544237 -0.229777 0.0254703)
    Thelen2003Muscle add_brev_r: max_isometric_force=429 optimal_fiber_length=0.1390338 tendon_slack_length=0.02090734
        pennation_angle_at_optimal=0
      PathPoint P1: pelvis (-0.0573348 -0.0893719 0.0150925)
      PathPoint P2: femur_r (0.000979627 -0.130182 0.0320012)
    Thelen2003Muscle add_mag1_r: max_isometric_force=381 optimal_fiber_length=0.09179864 tendon_slack_length=0.06330941
        pennation_angle_at_optimal=0.08726646
      PathPoint P1: pelvis (-0.0714975 -0.11467 0.023467)
      PathPoint P2: femur_r (-0.00489814 -0.131814 0.0368993)
    Thelen2003Muscle add_mag2_r: max_isometric_force=343 optimal_fiber_length=0.1330179 tendon_slack_length=0.1319185
        pennation_angle_at_optimal=0.05235988
      PathPoint P1: pelvis (-0.0811673 -0.116428 0.0283444)
      PathPoint P2: femur_r (0.00587776 -0.248717 0.0247084)
    Thelen2003Muscle add_mag3_r: max_isometric_force=488 optimal_fiber_length=0.1443776 tendon_slack_length=0.2744276
        pennation_angle_at_optimal=0.08726646
      PathPoint P1: pelvis (-0.108497 -0.111476 0.0449277)
      PathPoint P2: femur_r (0.00761932 -0.417648 -0.0289534)
    Thelen2003Muscle tfl_r: max_isometric_force=233 optimal_fiber_length=0.1025711 tendon_slack_length=0.4588708
        pennation_angle_at_optimal=0.05235988
      PathPoint P1: pelvis (-0.0303767 0.0209023 0.114206)
      PathPoint P2: femur_r (0.0320012 -0.108303 0.064982)
      PathPoint P3: femur_r (0.00587776 -0.440724 0.0388586)
      PathPoint P4: tibia_r (0.00712019 -0.0577922 0.0352449)
    Thelen2003Muscle pect_r: max_isometric_force=266 optimal_fiber_length=0.1048258 tendon_slack_length=0.03459251
        pennation_angle_at_optimal=0
      PathPoint P1: pelvis (-0.0420976 -0.0750138 0.0415043)
      PathPoint P2: femur_r (-0.0132794 -0.0894726 0.0275384)
    Thelen2003Muscle grac_r: max_isometric_force=162 optimal_fiber_length=0.3951934 tendon_slack_length=0.1414613
        pennation_angle_at_optimal=0.05235988
      PathPoint P1: pelvis (-0.0722887 -0.115939 0.0257124)
      ConditionalPathPoint P2: tibia_r (-0.0315306 -0.0378557 -0.044786)
          socket_coordinate=/jointset/knee_r/knee_angle_r range=(-0.436332 0.174533)
      PathPoint P3: tibia_r (-0.0230575 -0.0611505 -0.0424838)
      PathPoint P4: tibia_r (0.00712019 -0.0992079 -0.0270567)
    Thelen2003Muscle glut_max1_r: max_isometric_force=573 optimal_fiber_length=0.1441091 tendon_slack_length=0.1268566
        pennation_angle_at_optimal=0.08726646
      PathPoint P1: pelvis (-0.116721 0.0597766 0.0644191)
      PathPoint P2: pelvis (-0.126097 0.00117209 0.0815362)
      PathPoint P3: femur_r (-0.0497433 -0.0269942 0.0426682)
      PathPoint P4: femur_r (-0.0301508 -0.0616077 0.0511583)
    Thelen2003Muscle glut_max2_r: max_isometric_force=819 optimal_fiber_length=0.1510582 tendon_slack_length=0.1305061
        pennation_angle_at_optimal=0
      PathPoint P1: pelvis (-0.131763 0.0171907 0.0518114)
      PathPoint P2: pelvis (-0.1344 -0.0507906 0.0841129)
      PathPoint P3: femur_r (-0.046369 -0.0576892 0.0318923)
      PathPoint P4: femur_r (-0.0169802 -0.110589 0.0456071)
    Thelen2003Muscle glut_max3_r: max_isometric_force=552 optimal_fiber_length=0.1473212 tendon_slack_length=0.1483442
        pennation_angle_at_optimal=0.08726646
      PathPoint P1: pelvis (-0.151981 -0.0306697 0.00533758)
      PathPoint P2: pelvis (-0.149344 -0.102753 0.037087)
      PathPoint P3: femur_r (-0.0325454 -0.11331 0.0146944)
      PathPoint P4: femur_r (-0.00653085 -0.154455 0.0447363)
    Thelen2003Muscle iliacus_r: max_isometric_force=1073 optimal_fiber_length=0.1010349 tendon_slack_length=0.1010349
        pennation_angle_at_optimal=0.1221731
      PathPoint P1: pelvis (-0.0658324 0.0356511 0.0785913)
      PathPoint P2: pelvis (-0.0251999 -0.0537208 0.0746341)
      ConditionalPathPoint P3: pelvis (-0.0281302 -0.0786277 0.0750943) socket_coordinate=/jointset/hip_r/hip_flexion_r
          range=(-1.5708 0.785398)
      PathPoint P4: femur_r (0.00185041 -0.0591042 0.00620431)
      PathPoint P5: femur_r (-0.0210076 -0.0675943 0.0140413)
    Thelen2003Muscle psoas_r: max_isometric_force=1113 optimal_fiber_length=0.09981855 tendon_slack_length=0.1597097
        pennation_angle_at_optimal=0.1396263
      PathPoint P1: pelvis (-0.0631952 0.086637 0.0265959)
      PathPoint P2: pelvis (-0.0232465 -0.0556743 0.0698487)
      ConditionalPathPoint P3: pelvis (-0.0281302 -0.0786277 0.0750943) socket_coordinate=/jointset/hip_r/hip_flexion_r
          range=(-1.5708 0.785398)
      PathPoint P4: femur_r (0.00174156 -0.0551857 0.0041362)
      PathPoint P5: femur_r (-0.0204633 -0.064982 0.0113201)
    Thelen2003Muscle quad_fem_r: max_isometric_force=381 optimal_fiber_length=0.05386627 tendon_slack_length=0.02394056
        pennation_angle_at_optimal=0
      PathPoint P1: pelvis (-0.111642 -0.112423 0.0478542)
      PathPoint P2: femur_r (-0.0414709 -0.0390763 0.0398382)
    Thelen2003Muscle gem_r: max_isometric_force=164 optimal_fiber_length=0.02458106 tendon_slack_length=0.03994422
        pennation_angle_at_optimal=0
      PathPoint P1: pelvis (-0.110665 -0.0800929 0.0657075)
      PathPoint P2: femur_r (-0.0154563 -0.00359197 0.0482194)
    Thelen2003Muscle peri_r: max_isometric_force=444 optimal_fiber_length=0.02552649 tendon_slack_length=0.1129056
        pennation_angle_at_optimal=0.1745329
      PathPoint P1: pelvis (-0.136353 0.000293023 0.0216264)
      PathPoint P2: pelvis (-0.116525 -0.0269581 0.0604619)
      PathPoint P3: femur_r (-0.0161094 -0.00391851 0.0475664)
    Thelen2003Muscle rect_fem_r: max_isometric_force=1169 optimal_fiber_length=0.1225648 tendon_slack_length=0.3332902
        pennation_angle_at_optimal=0.08726646
      PathPoint P1: pelvis (-0.0288139 -0.0303767 0.0890824)
      ConditionalPathPoint P2: femur_r (0.0363551 -0.438655 0.0020681) socket_coordinate=/jointset/knee_r/knee_angle_r
          range=(-2.61799 -1.45997)
      MovingPathPoint P3: tibia_r socket_x_coordinate=/jointset/knee_r/knee_angle_r
          socket_y_coordinate=/jointset/knee_r/knee_angle_r socket_z_coordinate=/jointset/knee_r/knee_angle_r
        x_location: MultiplierFunction: scale=1.186698
          SimmSpline: x=(-2.0944 -1.99997 -1.5708 -1.45752 -1.39626 -1.0472 -0.698132 -0.526391 -0.349066 -0.174533 0 0.00017453 0.00034907 0.0279253 0.0872665 0.174533 2.0944)
              y=(0.0155805 0.0179938 0.0275081 0.0296564 0.0307615 0.0365695 0.0422074 0.0450902 0.048391 0.0534299 0.0617576 0.0617669 0.0617762 0.0633083 0.066994 0.0733035 0.0573481)
        y_location: MultiplierFunction: scale=1.186698
          SimmSpline: x=(-2.0944 -1.99997 -1.5708 -1.45752 -1.39626 -1.0472 -0.698132 -0.526391 -0.349066 -0.174533 0 0.00017453 0.00034907 0.0279253 0.0872665 0.174533 2.0944)
              y=(0.0234116 0.0237613 0.0251141 0.0252795 0.0253146 0.0249184 0.0242373 0.0238447 0.0234197 0.0227644 0.020984 0.0209814 0.0209788 0.0205225 0.0191754 0.0159554 -0.0673774)
        z_location: MultiplierFunction: scale=1.186698
          SimmSpline: x=(-2.0944 0.1745) y=(0.0014 0.0014)
    Thelen2003Muscle vas_med_r: max_isometric_force=1294 optimal_fiber_length=0.09644961 tendon_slack_length=0.1365466
        pennation_angle_at_optimal=0.08726646
      PathPoint P1: femur_r (0.0152386 -0.228471 0.0204633)
      PathPoint P2: femur_r (0.0387497 -0.301399 0.000979627)
      ConditionalPathPoint P3: femur_r (0.0402736 -0.440615 -0.0136059) socket_coordinate=/jointset/knee_r/knee_angle_r
          range=(-2.61799 -1.21004)
      ConditionalPathPoint P4: femur_r (0.0298242 -0.463146 -0.014259) socket_coordinate=/jointset/knee_r/knee_angle_r
          range=(-2.61799 -1.78006)
      MovingPathPoint P5: tibia_r socket_x_coordinate=/jointset/knee_r/knee_angle_r
          socket_y_coordinate=/jointset/knee_r/knee_angle_r socket_z_coordinate=/jointset/knee_r/knee_angle_r
        x_location: MultiplierFunction: scale=1.186698
          SimmSpline: x=(-2.0944 -1.99997 -1.5708 -1.45752 -1.39626 -1.0472 -0.698132 -0.526391 -0.349066 -0.174533 0 0.00017453 0.00034907 0.0279253 0.0872665 0.174533 2.0944)
              y=(0.00981097 0.0122243 0.0217371 0.0238851 0.0249902 0.0307959 0.0364187 0.0392871 0.0425654 0.0475764 0.0559586 0.0559681 0.0559776 0.0575419 0.0613368 0.0679503 0.0629332)
        y_location: MultiplierFunction: scale=1.186698
          SimmSpline: x=(-2.0944 -1.99997 -1.5708 -1.45752 -1.39626 -1.0472 -0.698132 -0.526391 -0.349066 -0.174533 0 0.00017453 0.00034907 0.0279253 0.0872665 0.174533 2.0944)
              y=(0.0224154 0.0227651 0.0241265 0.0242933 0.0243287 0.0239462 0.0233593 0.0230677 0.0228342 0.0226362 0.0217917 0.0217903 0.0217889 0.0215365 0.0206842 0.0183269 -0.0656205)
        z_location: MultiplierFunction: scale=1.186698
          SimmSpline: x=(-2.0944 2.0944) y=(-0.0146 -0.0146)
    Thelen2003Muscle vas_int_r: max_isometric_force=1365 optimal_fiber_length=0.09383728 tendon_slack_length=0.1466882
        pennation_angle_at_optimal=0.05235988
      PathPoint P1: femur_r (0.0315658 -0.209423 0.0337427)
      PathPoint P2: femur_r (0.0364639 -0.226838 0.0310215)
      ConditionalPathPoint P3: femur_r (0.0373347 -0.438655 0.00598661) socket_coordinate=/jointset/knee_r/knee_angle_r
          range=(-2.61799 -1.42)
      MovingPathPoint P4: tibia_r socket_x_coordinate=/jointset/knee_r/knee_angle_r
          socket_y_coordinate=/jointset/knee_r/knee_angle_r socket_z_coordinate=/jointset/knee_r/knee_angle_r
        x_location: MultiplierFunction: scale=1.186698
          SimmSpline: x=(-2.0944 -1.99997 -1.5708 -1.45752 -1.39626 -1.0472 -0.698132 -0.526391 -0.349066 -0.174533 0 0.00017453 0.00034907 0.0279253 0.0872665 0.174533 2.0944)
              y=(0.0082733 0.0106866 0.0202042 0.022353 0.0234583 0.0292715 0.0349465 0.037871 0.0412569 0.0465287 0.0554632 0.0554735 0.0554837 0.0571717 0.061272 0.0684368 0.0648818)
        y_location: MultiplierFunction: scale=1.186698
          SimmSpline: x=(-2.0944 -1.99997 -1.5708 -1.45752 -1.39626 -1.0472 -0.698132 -0.526391 -0.349066 -0.174533 0 0.00017453 0.00034907 0.0279253 0.0872665 0.174533 2.0944)
              y=(0.025599 0.0259487 0.0273124 0.0274796 0.0275151 0.0271363 0.0265737 0.0263073 0.0261187 0.0260129 0.0252923 0.0252911 0.0252898 0.0250526 0.0242191 0.0218288 -0.0685706)
        z_location: MultiplierFunction: scale=1.186698
          SimmSpline: x=(-2.0944 2.0944) y=(0.0018 0.0018)
    Thelen2003Muscle vas_lat_r: max_isometric_force=1871 optimal_fiber_length=0.09116557 tendon_slack_length=0.1703928
        pennation_angle_at_optimal=0.08726646
      PathPoint P1: femur_r (0.00522468 -0.201803 0.0379878)
      PathPoint P2: femur_r (0.02928 -0.282024 0.0445186)
      ConditionalPathPoint P3: femur_r (0.0392939 -0.438655 0.0223137) socket_coordinate=/jointset/knee_r/knee_angle_r
          range=(-2.61799 -1.21004)
      ConditionalPathPoint P4: femur_r (0.0275384 -0.46184 0.0200279) socket_coordinate=/jointset/knee_r/knee_angle_r
          range=(-2.61799 -1.92004)
      MovingPathPoint P5: tibia_r socket_x_coordinate=/jointset/knee_r/knee_angle_r
          socket_y_coordinate=/jointset/knee_r/knee_angle_r socket_z_coordinate=/jointset/knee_r/knee_angle_r
        x_location: MultiplierFunction: scale=1.186698
          SimmSpline: x=(-2.0944 -1.99997 -1.5708 -1.45752 -1.39626 -1.0472 -0.698132 -0.526391 -0.349066 -0.174533 0 0.00017453 0.00034907 0.0279253 0.0872665 0.174533 2.0944)
              y=(0.0142897 0.016703 0.0262145 0.0283623 0.0294674 0.0352709 0.0408785 0.0437291 0.0469704 0.0518742 0.0599557 0.0599647 0.0599738 0.0614577 0.0650351 0.0711867 0.0583766)
        y_location: MultiplierFunction: scale=1.186698
          SimmSpline: x=(-2.0944 -1.99997 -1.5708 -1.45752 -1.39626 -1.0472 -0.698132 -0.526391 -0.349066 -0.174533 0 0.00017453 0.00034907 0.0279253 0.0872665 0.174533 2.0944)
              y=(0.0215318 0.0218815 0.0232362 0.0234019 0.0234371 0.0230439 0.0223842 0.0220151 0.0216359 0.0210971 0.0195864 0.0195842 0.019582 0.01919 0.018008 0.0151073 -0.0653421)
        z_location: MultiplierFunction: scale=1.186698
          SimmSpline: x=(-2.0944 2.0944) y=(0.0165 0.0165)
    Thelen2003Muscle med_gas_r: max_isometric_force=1558 optimal_fiber_length=0.06993179 tendon_slack_length=0.4545567
        pennation_angle_at_optimal=0.296706
      PathPoint P1: femur_r (-0.020681 -0.427662 -0.0255792)
      ConditionalPathPoint P2: femur_r (-0.0326542 -0.437785 -0.0280827)
          socket_coordinate=/jointset/knee_r/knee_angle_r range=(-0.785398 0.174533)
      PathPoint P3: calcn_r (0 0.0354715 -0.00606449)
    Thelen2003Muscle lat_gas_r: max_isometric_force=683 optimal_fiber_length=0.07465768 tendon_slack_length=0.44328
        pennation_angle_at_optimal=0.1396263
      PathPoint P1: femur_r (-0.0239464 -0.429512 0.0296065)
      ConditionalPathPoint P2: femur_r (-0.0326542 -0.437349 0.0298242) socket_coordinate=/jointset/knee_r/knee_angle_r
          range=(-0.785398 0.174533)
      PathPoint P3: calcn_r (0 0.0354715 -0.00606449)
    Thelen2003Muscle soleus_r: max_isometric_force=3549 optimal_fiber_length=0.05768827 tendon_slack_length=0.2884414
        pennation_angle_at_optimal=0.4363323
      PathPoint P1: tibia_r (-0.00284807 -0.181921 0.00842556)
      PathPoint P2: calcn_r (0 0.0354715 -0.00606449)
    Thelen2003Muscle tib_post_r: max_isometric_force=1588 optimal_fiber_length=0.03625269 tendon_slack_length=0.3625269
        pennation_angle_at_optimal=0.2094395
      PathPoint P1: tibia_r (-0.011155 -0.159967 0.00225473)
      PathPoint P2: tibia_r (-0.0170884 -0.480731 -0.0271754)
      PathPoint P3: calcn_r (0.0477149 0.0382177 -0.0327253)
      PathPoint P4: calcn_r (0.0883355 0.0181935 -0.0321532)
    Thelen2003Muscle flex_dig_r: max_isometric_force=310 optimal_fiber_length=0.03842699 tendon_slack_length=0.4520822
        pennation_angle_at_optimal=0.1221731
      PathPoint P1: tibia_r (-0.00984959 -0.242798 -0.00213606)
      PathPoint P2: tibia_r (-0.0182751 -0.480731 -0.0232593)
      PathPoint P3: calcn_r (0.049889 0.0360436 -0.0320388)
      PathPoint P4: calcn_r (0.0810124 0.0201387 -0.0300936)
      PathPoint P5: calcn_r (0.189715 -0.00926837 0.0132732)
      PathPoint P6: toes_r (-0.00168816 -0.00693034 0.013061)
      PathPoint P7: toes_r (0.0253224 -0.00630838 0.0191029)
      PathPoint P8: toes_r (0.0391831 -0.00533103 0.0215018)
    Thelen2003Muscle flex_hal_r: max_isometric_force=322 optimal_fiber_length=0.04830334 tendon_slack_length=0.4268667
        pennation_angle_at_optimal=0.1745329
      PathPoint P1: tibia_r (-0.00937491 -0.276975 0.0289554)
      PathPoint P2: tibia_r (-0.0220726 -0.484054 -0.0206485)
      PathPoint P3: calcn_r (0.0427947 0.0315811 -0.0275762)
      PathPoint P4: calcn_r (0.118772 0.00778085 -0.0292926)
      PathPoint P5: calcn_r (0.197496 -0.00606449 -0.0307801)
      PathPoint P6: toes_r (0.0137718 -0.00568643 -0.0235454)
      PathPoint P7: toes_r (0.049934 -0.00906275 -0.0160819)
    Thelen2003Muscle tib_ant_r: max_isometric_force=905 optimal_fiber_length=0.1150827 tendon_slack_length=0.2618719
        pennation_angle_at_optimal=0.08726646
      PathPoint P1: tibia_r (0.0212419 -0.19272 0.013647)
      PathPoint P2: tibia_r (0.0390424 -0.468864 -0.0210046)
      PathPoint P3: calcn_r (0.133419 0.0203675 -0.0348994)
    Thelen2003Muscle per_brev_r: max_isometric_force=435 optimal_fiber_length=0.05960945 tendon_slack_length=0.1919424
        pennation_angle_at_optimal=0.08726646
      PathPoint P1: tibia_r (-0.00830689 -0.314 0.0385677)
      PathPoint P2: tibia_r (-0.0234966 -0.496514 0.0335836)
      PathPoint P3: tibia_r (-0.0170884 -0.509687 0.0342956)
      PathPoint P4: calcn_r (0.0538938 0.0308946 0.0266609)
      PathPoint P5: calcn_r (0.0774652 0.0250589 0.0392475)
    Thelen2003Muscle per_long_r: max_isometric_force=943 optimal_fiber_length=0.05776844 tendon_slack_length=0.406737
        pennation_angle_at_optimal=0.1745329
      PathPoint P1: tibia_r (0.000593349 -0.186074 0.0429585)
      PathPoint P2: tibia_r (-0.0245646 -0.499006 0.0339396)
      PathPoint P3: tibia_r (-0.0192245 -0.512535 0.0342956)
      PathPoint P4: calcn_r (0.0501178 0.0263176 0.0252878)
      PathPoint P5: calcn_r (0.0779229 0.012129 0.0324965)
      PathPoint P6: calcn_r (0.0974895 0.00789527 0.0135021)
      PathPoint P7: calcn_r (0.137652 0.00972606 -0.0210541)
    Thelen2003Muscle per_tert_r: max_isometric_force=180 optimal_fiber_length=0.09126349 tendon_slack_length=0.1155234
        pennation_angle_at_optimal=0.2268928
      PathPoint P1: tibia_r (0.0011867 -0.33275 0.0274127)
      PathPoint P2: tibia_r (0.0271754 -0.482867 0.0188685)
      PathPoint P3: calcn_r (0.0980616 0.0260887 0.0342129)
    Thelen2003Muscle ext_dig_r: max_isometric_force=512 optimal_fiber_length=0.1162314 tendon_slack_length=0.3931355
        pennation_angle_at_optimal=0.1396263
      PathPoint P1: tibia_r (0.00379743 -0.163883 0.0327529)
      PathPoint P2: tibia_r (0.0342956 -0.47551 0.00854422)
      PathPoint P3: calcn_r (0.105499 0.0443966 -0.000114424)
      PathPoint P4: calcn_r (0.18491 0.00629333 0.0148752)
      PathPoint P5: toes_r (0.000266551 0.00417597 0.0135941)
      PathPoint P6: toes_r (0.0393608 -0.000355402 0.0222126)
    Thelen2003Muscle ext_hal_r: max_isometric_force=162 optimal_fiber_length=0.1259277 tendon_slack_length=0.3460176
        pennation_angle_at_optimal=0.1047198
      PathPoint P1: tibia_r (0.00142404 -0.20969 0.0270567)
      PathPoint P2: tibia_r (0.0386864 -0.472899 -0.0100869)
      PathPoint P3: calcn_r (0.110992 0.044511 -0.0241435)
      PathPoint P4: calcn_r (0.147951 0.0353571 -0.029407)
      PathPoint P5: calcn_r (0.198412 0.015905 -0.0320388)
      PathPoint P6: toes_r (0.0264774 0.00364287 -0.0217684)
      PathPoint P7: toes_r (0.0500228 0.00302092 -0.0165262)
    Thelen2003Muscle glut_med1_l: max_isometric_force=819 optimal_fiber_length=0.0538929 tendon_slack_length=0.07857282
        pennation_angle_at_optimal=0.1396263
      PathPoint P1: pelvis (-0.0398511 0.029693 -0.111261)
      PathPoint P2: femur_l (-0.0237288 -0.0127352 -0.0604104)
    Thelen2003Muscle glut_med2_l: max_isometric_force=573 optimal_fiber_length=0.08473686
        tendon_slack_length=0.05314856 pennation_angle_at_optimal=0
      PathPoint P1: pelvis (-0.0835115 0.043465 -0.0704929)
      PathPoint P2: femur_l (-0.0280827 -0.00631315 -0.0573626)
    Thelen2003Muscle glut_med3_l: max_isometric_force=653 optimal_fiber_length=0.06480935
        tendon_slack_length=0.05317176 pennation_angle_at_optimal=0.3316126
      PathPoint P1: pelvis (-0.119456 0.0102558 -0.0596337)
      PathPoint P2: femur_l (-0.0336339 -0.00511583 -0.056383)
    Thelen2003Muscle glut_min1_l: max_isometric_force=270 optimal_fiber_length=0.07019248
        tendon_slack_length=0.01651588 pennation_angle_at_optimal=0.1745329
      PathPoint P1: pelvis (-0.0456139 -0.00781394 -0.0971808)
      PathPoint P2: femur_l (-0.00783702 -0.0113201 -0.0609546)
    Thelen2003Muscle glut_min2_l: max_isometric_force=285 optimal_fiber_length=0.05800705
        tendon_slack_length=0.02693184 pennation_angle_at_optimal=0
      PathPoint P1: pelvis (-0.0618278 -0.00634882 -0.091199)
      PathPoint P2: femur_l (-0.0104494 -0.0113201 -0.0609546)
    Thelen2003Muscle glut_min3_l: max_isometric_force=323 optimal_fiber_length=0.0391911 tendon_slack_length=0.05259859
        pennation_angle_at_optimal=0.01745329
      PathPoint P1: pelvis (-0.0814603 -0.00615348 -0.0787754)
      PathPoint P2: femur_l (-0.0146944 -0.00903434 -0.0598661)
    Thelen2003Muscle semimem_l: max_isometric_force=1288 optimal_fiber_length=0.08869511 tendon_slack_length=0.3980193
        pennation_angle_at_optimal=0.2617994
      PathPoint P1: pelvis (-0.116428 -0.0952031 -0.0658087)
      ConditionalPathPoint P2: tibia_l (-0.0412971 -0.0417599 0.0224405)
          socket_coordinate=/jointset/knee_l/knee_angle_l range=(-0.558505 0.174533)
      PathPoint P3: tibia_l (-0.0320408 -0.0566174 0.0232237)
    Thelen2003Muscle semiten_l: max_isometric_force=410 optimal_fiber_length=0.2256058 tendon_slack_length=0.2867775
        pennation_angle_at_optimal=0.08726646
      PathPoint P1: pelvis (-0.123411 -0.107324 -0.0555753)
      ConditionalPathPoint P2: tibia_l (-0.0498769 -0.0339277 0.0270211)
          socket_coordinate=/jointset/knee_l/knee_angle_l range=(-0.331613 0.174533)
      PathPoint P3: tibia_l (-0.0394221 -0.0626814 0.0271516)
      PathPoint P4: tibia_l (-0.0134097 -0.0885277 0.0290741)
      PathPoint P5: tibia_l (0.00320408 -0.113448 0.0229033)
    Thelen2003Muscle bifemlh_l: max_isometric_force=896 optimal_fiber_length=0.1210809 tendon_slack_length=0.3621319
        pennation_angle_at_optimal=0
      PathPoint P1: pelvis (-0.12303 -0.100184 -0.0639038)
      PathPoint P2: tibia_l (-0.0357196 -0.0427211 -0.0349245)
      PathPoint P3: tibia_l (-0.0277687 -0.0668111 -0.0407037)
    Thelen2003Muscle bifemsh_l: max_isometric_force=804 optimal_fiber_length=0.1927029 tendon_slack_length=0.09913619
        pennation_angle_at_optimal=0.4014257
      PathPoint P1: femur_l (0.00544237 -0.229777 -0.0254703)
      PathPoint P2: tibia_l (-0.0357196 -0.0427211 -0.0349245)
      PathPoint P3: tibia_l (-0.0277687 -0.0668111 -0.0407037)
    Thelen2003Muscle sar_l: max_isometric_force=156 optimal_fiber_length=0.5663211 tendon_slack_length=0.1089079
        pennation_angle_at_optimal=0
      PathPoint P1: pelvis (-0.0149442 -0.00126976 -0.114298)
      PathPoint P2: femur_l (-0.00326542 -0.388368 0.0458248)
      PathPoint P3: tibia_l (-0.00664551 -0.0497226 0.0473492)
      PathPoint P4: tibia_l (0.00712019 -0.0698965 0.0454505)
      PathPoint P5: tibia_l (0.0288368 -0.0996826 0.0299048)
    Thelen2003Muscle add_long_l: max_isometric_force=627 optimal_fiber_length=0.1480972 tendon_slack_length=0.1180485
        pennation_angle_at_optimal=0.1047198
      PathPoint P1: pelvis (-0.0308651 -0.0816556 -0.0155526)
      PathPoint P2: femur_l (0.00544237 -0.229777 -0.0254703)
    Thelen2003Muscle add_brev_l: max_isometric_force=429 optimal_fiber_length=0.1390338 tendon_slack_length=0.02090734
        pennation_angle_at_optimal=0
      PathPoint P1: pelvis (-0.0573348 -0.0893719 -0.0150925)
      PathPoint P2: femur_l (0.000979627 -0.130182 -0.0320012)
    Thelen2003Muscle add_mag1_l: max_isometric_force=381 optimal_fiber_length=0.09179864 tendon_slack_length=0.06330941
        pennation_angle_at_optimal=0.08726646
      PathPoint P1: pelvis (-0.0714975 -0.11467 -0.023467)
      PathPoint P2: femur_l (-0.00489814 -0.131814 -0.0368993)
    Thelen2003Muscle add_mag2_l: max_isometric_force=343 optimal_fiber_length=0.1330179 tendon_slack_length=0.1319185
        pennation_angle_at_optimal=0.05235988
      PathPoint P1: pelvis (-0.0811673 -0.116428 -0.0283444)
      PathPoint P2: femur_l (0.00587776 -0.248717 -0.0247084)
    Thelen2003Muscle add_mag3_l: max_isometric_force=488 optimal_fiber_length=0.1443776 tendon_slack_length=0.2744276
        pennation_angle_at_optimal=0.08726646
      PathPoint P1: pelvis (-0.108497 -0.111476 -0.0449277)
      PathPoint P2: femur_l (0.00761932 -0.417648 0.0289534)
    Thelen2003Muscle tfl_l: max_isometric_force=233 optimal_fiber_length=0.1025711 tendon_slack_length=0.4588708
        pennation_angle_at_optimal=0.05235988
      PathPoint P1: pelvis (-0.0303767 0.0209023 -0.114206)
      PathPoint P2: femur_l (0.0320012 -0.108303 -0.064982)
      PathPoint P3: femur_l (0.00587776 -0.440724 -0.0388586)
      PathPoint P4: tibia_l (0.00712019 -0.0577922 -0.0352449)
    Thelen2003Muscle pect_l: max_isometric_force=266 optimal_fiber_length=0.1048258 tendon_slack_length=0.03459251
        pennation_angle_at_optimal=0
      PathPoint P1: pelvis (-0.0420976 -0.0750138 -0.0415043)
      PathPoint P2: femur_l (-0.0132794 -0.0894726 -0.0275384)
    Thelen2003Muscle grac_l: max_isometric_force=162 optimal_fiber_length=0.3951934 tendon_slack_length=0.1414613
        pennation_angle_at_optimal=0.05235988
      PathPoint P1: pelvis (-0.0722887 -0.115939 -0.0257124)
      ConditionalPathPoint P2: tibia_l (-0.0315306 -0.0378557 0.044786) socket_coordinate=/jointset/knee_l/knee_angle_l
          range=(-0.436332 0.174533)
      PathPoint P3: tibia_l (-0.0230575 -0.0611505 0.0424838)
      PathPoint P4: tibia_l (0.00712019 -0.0992079 0.0270567)
    Thelen2003Muscle glut_max1_l: max_isometric_force=573 optimal_fiber_length=0.1441091 tendon_slack_length=0.1268566
        pennation_angle_at_optimal=0.08726646
      PathPoint P1: pelvis (-0.116721 0.0597766 -0.0644191)
      PathPoint P2: pelvis (-0.126097 0.00117209 -0.0815362)
      PathPoint P3: femur_l (-0.0497433 -0.0269942 -0.0426682)
      PathPoint P4: femur_l (-0.0301508 -0.0616077 -0.0511583)
    Thelen2003Muscle glut_max2_l: max_isometric_force=819 optimal_fiber_length=0.1510582 tendon_slack_length=0.1305061
        pennation_angle_at_optimal=0
      PathPoint P1: pelvis (-0.131763 0.0171907 -0.0518114)
      PathPoint P2: pelvis (-0.1344 -0.0507906 -0.0841129)
      PathPoint P3: femur_l (-0.046369 -0.0576892 -0.0318923)
      PathPoint P4: femur_l (-0.0169802 -0.110589 -0.0456071)
    Thelen2003Muscle glut_max3_l: max_isometric_force=552 optimal_fiber_length=0.1473212 tendon_slack_length=0.1483442
        pennation_angle_at_optimal=0.08726646
      PathPoint P1: pelvis (-0.151981 -0.0306697 -0.00533758)
      PathPoint P2: pelvis (-0.149344 -0.102753 -0.037087)
      PathPoint P3: femur_l (-0.0325454 -0.11331 -0.0146944)
      PathPoint P4: femur_l (-0.00653085 -0.154455 -0.0447363)
    Thelen2003Muscle iliacus_l: max_isometric_force=1073 optimal_fiber_length=0.1010349 tendon_slack_length=0.1010349
        pennation_angle_at_optimal=0.1221731
      PathPoint P1: pelvis (-0.0658324 0.0356511 -0.0785913)
      PathPoint P2: pelvis (-0.0251999 -0.0537208 -0.0746341)
      ConditionalPathPoint P3: pelvis (-0.0281302 -0.0786277 -0.0750943)
          socket_coordinate=/jointset/hip_l/hip_flexion_l range=(-1.5708 0.785398)
      PathPoint P4: femur_l (0.00185041 -0.0591042 -0.00620431)
      PathPoint P5: femur_l (-0.0210076 -0.0675943 -0.0140413)
    Thelen2003Muscle psoas_l: max_isometric_force=1113 optimal_fiber_length=0.09981855 tendon_slack_length=0.1597097
        pennation_angle_at_optimal=0.1396263
      PathPoint P1: pelvis (-0.0631952 0.086637 -0.0265959)
      PathPoint P2: pelvis (-0.0232465 -0.0556743 -0.0698487)
      ConditionalPathPoint P3: pelvis (-0.0281302 -0.0786277 -0.0750943)
          socket_coordinate=/jointset/hip_l/hip_flexion_l range=(-1.5708 0.785398)
      PathPoint P4: femur_l (0.00174156 -0.0551857 -0.0041362)
      PathPoint P5: femur_l (-0.0204633 -0.064982 -0.0113201)
    Thelen2003Muscle quad_fem_l: max_isometric_force=381 optimal_fiber_length=0.05386627 tendon_slack_length=0.02394056
        pennation_angle_at_optimal=0
      PathPoint P1: pelvis (-0.111642 -0.112423 -0.0478542)
      PathPoint P2: femur_l (-0.0414709 -0.0390763 -0.0398382)
    Thelen2003Muscle gem_l: max_isometric_force=164 optimal_fiber_length=0.02458106 tendon_slack_length=0.03994422
        pennation_angle_at_optimal=0
      PathPoint P1: pelvis (-0.110665 -0.0800929 -0.0657075)
      PathPoint P2: femur_l (-0.0154563 -0.00359197 -0.0482194)
    Thelen2003Muscle peri_l: max_isometric_force=444 optimal_fiber_length=0.02552649 tendon_slack_length=0.1129056
        pennation_angle_at_optimal=0.1745329
      PathPoint P1: pelvis (-0.136353 0.000293023 -0.0216264)
      PathPoint P2: pelvis (-0.116525 -0.0269581 -0.0604619)
      PathPoint P3: femur_l (-0.0161094 -0.00391851 -0.0475664)
    Thelen2003Muscle rect_fem_l: max_isometric_force=1169 optimal_fiber_length=0.1225648 tendon_slack_length=0.3332902
        pennation_angle_at_optimal=0.08726646
      PathPoint P1: pelvis (-0.0288139 -0.0303767 -0.0890824)
      ConditionalPathPoint P2: femur_l (0.0363551 -0.438655 -0.0020681) socket_coordinate=/jointset/knee_l/knee_angle_l
          range=(-2.61799 -1.45997)
      MovingPathPoint P3: tibia_l socket_x_coordinate=/jointset/knee_l/knee_angle_l
          socket_y_coordinate=/jointset/knee_l/knee_angle_l socket_z_coordinate=/jointset/knee_l/knee_angle_l
        x_location: MultiplierFunction: scale=1.186698
          SimmSpline: x=(-2.0944 -1.99997 -1.5708 -1.45752 -1.39626 -1.0472 -0.698132 -0.526391 -0.349066 -0.174533 0 0.00017453 0.00034907 0.0279253 0.0872665 0.174533 2.0944)
              y=(0.0155805 0.0179938 0.0275081 0.0296564 0.0307615 0.0365695 0.0422074 0.0450902 0.048391 0.0534299 0.0617576 0.0617669 0.0617762 0.0633083 0.066994 0.0733035 0.0573481)
        y_location: MultiplierFunction: scale=1.186698
          SimmSpline: x=(-2.0944 -1.99997 -1.5708 -1.45752 -1.39626 -1.0472 -0.698132 -0.526391 -0.349066 -0.174533 0 0.00017453 0.00034907 0.0279253 0.0872665 0.174533 2.0944)
              y=(0.0234116 0.0237613 0.0251141 0.0252795 0.0253146 0.0249184 0.0242373 0.0238447 0.0234197 0.0227644 0.020984 0.0209814 0.0209788 0.0205225 0.0191754 0.0159554 -0.0673774)
        z_location: MultiplierFunction: scale=1.186698
          SimmSpline: x=(-2.0944 0.1745) y=(-0.0014 -0.0014)
    Thelen2003Muscle vas_med_l: max_isometric_force=1294 optimal_fiber_length=0.09644961 tendon_slack_length=0.1365466
        pennation_angle_at_optimal=0.08726646
      PathPoint P1: femur_l (0.0152386 -0.228471 -0.0204633)
      PathPoint P2: femur_l (0.0387497 -0.301399 -0.000979627)
      ConditionalPathPoint P3: femur_l (0.0402736 -0.440615 0.0136059) socket_coordinate=/jointset/knee_l/knee_angle_l
          range=(-2.61799 -1.21004)
      ConditionalPathPoint P4: femur_l (0.0298242 -0.463146 0.014259) socket_coordinate=/jointset/knee_l/knee_angle_l
          range=(-2.61799 -1.78006)
      MovingPathPoint P5: tibia_l socket_x_coordinate=/jointset/knee_l/knee_angle_l
          socket_y_coordinate=/jointset/knee_l/knee_angle_l socket_z_coordinate=/jointset/knee_l/knee_angle_l
        x_location: MultiplierFunction: scale=1.186698
          SimmSpline: x=(-2.0944 -1.99997 -1.5708 -1.45752 -1.39626 -1.0472 -0.698132 -0.526391 -0.349066 -0.174533 0 0.00017453 0.00034907 0.0279253 0.0872665 0.174533 2.0944)
              y=(0.00981097 0.0122243 0.0217371 0.0238851 0.0249902 0.0307959 0.0364187 0.0392871 0.0425654 0.0475764 0.0559586 0.0559681 0.0559776 0.0575419 0.0613368 0.0679503 0.0629332)
        y_location: MultiplierFunction: scale=1.186698
          SimmSpline: x=(-2.0944 -1.99997 -1.5708 -1.45752 -1.39626 -1.0472 -0.698132 -0.526391 -0.349066 -0.174533 0 0.00017453 0.00034907 0.0279253 0.0872665 0.174533 2.0944)
              y=(0.0224154 0.0227651 0.0241265 0.0242933 0.0243287 0.0239462 0.0233593 0.0230677 0.0228342 0.0226362 0.0217917 0.0217903 0.0217889 0.0215365 0.0206842 0.0183269 -0.0656205)
        z_location: MultiplierFunction: scale=1.186698
          SimmSpline: x=(-2.0944 2.0944) y=(0.0146 0.0146)
    Thelen2003Muscle vas_int_l: max_isometric_force=1365 optimal_fiber_length=0.09383728 tendon_slack_length=0.1466882
        pennation_angle_at_optimal=0.05235988
      PathPoint P1: femur_l (0.0315658 -0.209423 -0.0337427)
      PathPoint P2: femur_l (0.0364639 -0.226838 -0.0310215)
      ConditionalPathPoint P3: femur_l (0.0373347 -0.438655 -0.00598661)
          socket_coordinate=/jointset/knee_l/knee_angle_l range=(-2.61799 -1.42)
      MovingPathPoint P4: tibia_l socket_x_coordinate=/jointset/knee_l/knee_angle_l
          socket_y_coordinate=/jointset/knee_l/knee_angle_l socket_z_coordinate=/jointset/knee_l/knee_angle_l
        x_location: MultiplierFunction: scale=1.186698
          SimmSpline: x=(-2.0944 -1.99997 -1.5708 -1.45752 -1.39626 -1.0472 -0.698132 -0.526391 -0.349066 -0.174533 0 0.00017453 0.00034907 0.0279253 0.0872665 0.174533 2.0944)
              y=(0.0082733 0.0106866 0.0202042 0.022353 0.0234583 0.0292715 0.0349465 0.037871 0.0412569 0.0465287 0.0554632 0.0554735 0.0554837 0.0571717 0.061272 0.0684368 0.0648818)
        y_location: MultiplierFunction: scale=1.186698
          SimmSpline: x=(-2.0944 -1.99997 -1.5708 -1.45752 -1.39626 -1.0472 -0.698132 -0.526391 -0.349066 -0.174533 0 0.00017453 0.00034907 0.0279253 0.0872665 0.174533 2.0944)
              y=(0.025599 0.0259487 0.0273124 0.0274796 0.0275151 0.0271363 0.0265737 0.0263073 0.0261187 0.0260129 0.0252923 0.0252911 0.0252898 0.0250526 0.0242191 0.0218288 -0.0685706)
        z_location: MultiplierFunction: scale=1.186698
          SimmSpline: x=(-2.0944 2.0944) y=(-0.0018 -0.0018)
    Thelen2003Muscle vas_lat_l: max_isometric_force=1871 optimal_fiber_length=0.09116557 tendon_slack_length=0.1703928
        pennation_angle_at_optimal=0.08726646
      PathPoint P1: femur_l (0.00522468 -0.201803 -0.0379878)
      PathPoint P2: femur_l (0.02928 -0.282024 -0.0445186)
      ConditionalPathPoint P3: femur_l (0.0392939 -0.438655 -0.0223137) socket_coordinate=/jointset/knee_l/knee_angle_l
          range=(-2.61799 -1.21004)
      ConditionalPathPoint P4: femur_l (0.0275384 -0.46184 -0.0200279) socket_coordinate=/jointset/knee_l/knee_angle_l
          range=(-2.61799 -1.92004)
      MovingPathPoint P5: tibia_l socket_x_coordinate=/jointset/knee_l/knee_angle_l
          socket_y_coordinate=/jointset/knee_l/knee_angle_l socket_z_coordinate=/jointset/knee_l/knee_angle_l
        x_location: MultiplierFunction: scale=1.186698
          SimmSpline: x=(-2.0944 -1.99997 -1.5708 -1.45752 -1.39626 -1.0472 -0.698132 -0.526391 -0.349066 -0.174533 0 0.00017453 0.00034907 0.0279253 0.0872665 0.174533 2.0944)
              y=(0.0142897 0.016703 0.0262145 0.0283623 0.0294674 0.0352709 0.0408785 0.0437291 0.0469704 0.0518742 0.0599557 0.0599647 0.0599738 0.0614577 0.0650351 0.0711867 0.0583766)
        y_location: MultiplierFunction: scale=1.186698
          SimmSpline: x=(-2.0944 -1.99997 -1.5708 -1.45752 -1.39626 -1.0472 -0.698132 -0.526391 -0.349066 -0.174533 0 0.00017453 0.00034907 0.0279253 0.0872665 0.174533 2.0944)
              y=(0.0215318 0.0218815 0.0232362 0.0234019 0.0234371 0.0230439 0.0223842 0.0220151 0.0216359 0.0210971 0.0195864 0.0195842 0.019582 0.01919 0.018008 0.0151073 -0.0653421)
        z_location: MultiplierFunction: scale=1.186698
          SimmSpline: x=(-2.0944 2.0944) y=(-0.0165 -0.0165)
    Thelen2003Muscle med_gas_l: max_isometric_force=1558 optimal_fiber_length=0.06993179 tendon_slack_length=0.4545567
        pennation_angle_at_optimal=0.296706
      PathPoint P1: femur_l (-0.020681 -0.427662 0.0255792)
      ConditionalPathPoint P2: femur_l (-0.0326542 -0.437785 0.0280827) socket_coordinate=/jointset/knee_l/knee_angle_l
          range=(-0.785398 0.174533)
      PathPoint P3: calcn_l (0 0.0354715 0.00606449)
    Thelen2003Muscle lat_gas_l: max_isometric_force=683 optimal_fiber_length=0.07465768 tendon_slack_length=0.44328
        pennation_angle_at_optimal=0.1396263
      PathPoint P1: femur_l (-0.0239464 -0.429512 -0.0296065)
      ConditionalPathPoint P2: femur_l (-0.0326542 -0.437349 -0.0298242)
          socket_coordinate=/jointset/knee_l/knee_angle_l range=(-0.785398 0.174533)
      PathPoint P3: calcn_l (0 0.0354715 0.00606449)
    Thelen2003Muscle soleus_l: max_isometric_force=3549 optimal_fiber_length=0.05768827 tendon_slack_length=0.2884414
        pennation_angle_at_optimal=0.4363323
      PathPoint P1: tibia_l (-0.00284807 -0.181921 -0.00842556)
      PathPoint P2: calcn_l (0 0.0354715 0.00606449)
    Thelen2003Muscle tib_post_l: max_isometric_force=1588 optimal_fiber_length=0.03625269 tendon_slack_length=0.3625269
        pennation_angle_at_optimal=0.2094395
      PathPoint P1: tibia_l (-0.011155 -0.159967 -0.00225473)
      PathPoint P2: tibia_l (-0.0170884 -0.480731 0.0271754)
      PathPoint P3: calcn_l (0.0477149 0.0382177 0.0327253)
      PathPoint P4: calcn_l (0.0883355 0.0181935 0.0321532)
    Thelen2003Muscle flex_dig_l: max_isometric_force=310 optimal_fiber_length=0.03842699 tendon_slack_length=0.4520822
        pennation_angle_at_optimal=0.1221731
      PathPoint P1: tibia_l (-0.00984959 -0.242798 0.00213606)
      PathPoint P2: tibia_l (-0.0182751 -0.480731 0.0232593)
      PathPoint P3: calcn_l (0.049889 0.0360436 0.0320388)
      PathPoint P4: calcn_l (0.0810124 0.0201387 0.0300936)
      PathPoint P5: calcn_l (0.189715 -0.00926837 -0.0132732)
      PathPoint P6: toes_l (-0.00168816 -0.00693034 -0.013061)
      PathPoint P7: toes_l (0.0253224 -0.00630838 -0.0191029)
      PathPoint P8: toes_l (0.0391831 -0.00533103 -0.0215018)
    Thelen2003Muscle flex_hal_l: max_isometric_force=322 optimal_fiber_length=0.04830334 tendon_slack_length=0.4268667
        pennation_angle_at_optimal=0.1745329
      PathPoint P1: tibia_l (-0.00937491 -0.276975 -0.0289554)
      PathPoint P2: tibia_l (-0.0220726 -0.484054 0.0206485)
      PathPoint P3: calcn_l (0.0427947 0.0315811 0.0275762)
      PathPoint P4: calcn_l (0.118772 0.00778085 0.0292926)
      PathPoint P5: calcn_l (0.197496 -0.00606449 0.0307801)
      PathPoint P6: toes_l (0.0137718 -0.00568643 0.0235454)
      PathPoint P7: toes_l (0.049934 -0.00906275 0.0160819)
    Thelen2003Muscle tib_ant_l: max_isometric_force=905 optimal_fiber_length=0.1150827 tendon_slack_length=0.2618719
        pennation_angle_at_optimal=0.08726646
      PathPoint P1: tibia_l (0.0212419 -0.19272 -0.013647)
      PathPoint P2: tibia_l (0.0390424 -0.468864 0.0210046)
      PathPoint P3: calcn_l (0.133419 0.0203675 0.0348994)
    Thelen2003Muscle per_brev_l: max_isometric_force=435 optimal_fiber_length=0.05960945 tendon_slack_length=0.1919424
        pennation_angle_at_optimal=0.08726646
      PathPoint P1: tibia_l (-0.00830689 -0.314 -0.0385677)
      PathPoint P2: tibia_l (-0.0234966 -0.496514 -0.0335836)
      PathPoint P3: tibia_l (-0.0170884 -0.509687 -0.0342956)
      PathPoint P4: calcn_l (0.0538938 0.0308946 -0.0266609)
      PathPoint P5: calcn_l (0.0774652 0.0250589 -0.0392475)
    Thelen2003Muscle per_long_l: max_isometric_force=943 optimal_fiber_length=0.05776844 tendon_slack_length=0.406737
        pennation_angle_at_optimal=0.1745329
      PathPoint P1: tibia_l (0.000593349 -0.186074 -0.0429585)
      PathPoint P2: tibia_l (-0.0245646 -0.499006 -0.0339396)
      PathPoint P3: tibia_l (-0.0192245 -0.512535 -0.0342956)
      PathPoint P4: calcn_l (0.0501178 0.0263176 -0.0252878)
      PathPoint P5: calcn_l (0.0779229 0.012129 -0.0324965)
      PathPoint P6: calcn_l (0.0974895 0.00789527 -0.0135021)
      PathPoint P7: calcn_l (0.137652 0.00972606 0.0210541)
    Thelen2003Muscle per_tert_l: max_isometric_force=180 optimal_fiber_length=0.09126349 tendon_slack_length=0.1155234
        pennation_angle_at_optimal=0.2268928
      PathPoint P1: tibia_l (0.0011867 -0.33275 -0.0274127)
      PathPoint P2: tibia_l (0.0271754 -0.482867 -0.0188685)
      PathPoint P3: calcn_l (0.0980616 0.0260887 -0.0342129)
    Thelen2003Muscle ext_dig_l: max_isometric_force=512 optimal_fiber_length=0.1162314 tendon_slack_length=0.3931355
        pennation_angle_at_optimal=0.1396263
      PathPoint P1: tibia_l (0.00379743 -0.163883 -0.0327529)
      PathPoint P2: tibia_l (0.0342956 -0.47551 -0.00854422)
      PathPoint P3: calcn_l (0.105499 0.0443966 0.000114424)
      PathPoint P4: calcn_l (0.18491 0.00629333 -0.0148752)
      PathPoint P5: toes_l (0.000266551 0.00417597 -0.0135941)
      PathPoint P6: toes_l (0.0393608 -0.000355402 -0.0222126)
    Thelen2003Muscle ext_hal_l: max_isometric_force=162 optimal_fiber_length=0.1259277 tendon_slack_length=0.3460176
        pennation_angle_at_optimal=0.1047198
      PathPoint P1: tibia_l (0.00142404 -0.20969 -0.0270567)
      PathPoint P2: tibia_l (0.0386864 -0.472899 0.0100869)
      PathPoint P3: calcn_l (0.110992 0.044511 0.0241435)
      PathPoint P4: calcn_l (0.147951 0.0353571 0.029407)
      PathPoint P5: calcn_l (0.198412 0.015905 0.0320388)
      PathPoint P6: toes_l (0.0264774 0.00364287 0.0217684)
      PathPoint P7: toes_l (0.0500228 0.00302092 0.0165262)
    Thelen2003Muscle ercspn_r: max_isometric_force=2500 optimal_fiber_length=0.1317493 tendon_slack_length=0.03293732
        pennation_angle_at_optimal=0
      PathPoint P1: pelvis (-0.136744 0.042879 0.0401239)
      PathPoint P2: torso (-0.0626713 0.125343 0.0274614)
    Thelen2003Muscle ercspn_l: max_isometric_force=2500 optimal_fiber_length=0.1317493 tendon_slack_length=0.03293732
        pennation_angle_at_optimal=0
      PathPoint P1: pelvis (-0.136744 0.042879 -0.0401239)
      PathPoint P2: torso (-0.0626713 0.125343 -0.0274614)
    Thelen2003Muscle intobl_r: max_isometric_force=900 optimal_fiber_length=0.1075725 tendon_slack_length=0.1075725
        pennation_angle_at_optimal=0
      PathPoint P1: pelvis (-0.0390697 0.068372 0.106476)
      PathPoint P2: torso (0.0797635 0.182317 0.0170922)
    Thelen2003Muscle intobl_l: max_isometric_force=900 optimal_fiber_length=0.1075725 tendon_slack_length=0.1075725
        pennation_angle_at_optimal=0
      PathPoint P1: pelvis (-0.0390697 0.068372 -0.106476)
      PathPoint P2: torso (0.0797635 0.182317 -0.0170922)
    Thelen2003Muscle extobl_r: max_isometric_force=900 optimal_fiber_length=0.1275364 tendon_slack_length=0.1487925
        pennation_angle_at_optimal=0
      PathPoint P1: pelvis (-0.0293023 -0.0621208 0.00920273)
      PathPoint P2: torso (0.0740661 0.125343 0.125343)
    Thelen2003Muscle extobl_l: max_isometric_force=900 optimal_fiber_length=0.1275364 tendon_slack_length=0.1487925
        pennation_angle_at_optimal=0
      PathPoint P1: pelvis (-0.0293023 -0.0621208 -0.00920273)
      PathPoint P2: torso (0.0740661 0.125343 -0.125343)
    HuntCrossleyForce Foot_Ground_R1: transition_velocity=0.1327498
      ContactParametersSet contact_parameters:
        ContactParameters: geometry=(ground right_one) stiffness=1.474053e7 dissipation=0.4163202 static_friction=0.8
            dynamic_friction=0.8 viscous_friction=0
    HuntCrossleyForce Foot_Ground_L1: transition_velocity=0.1327498
      ContactParametersSet contact_parameters:
        ContactParameters: geometry=(ground left_one) stiffness=1.474053e7 dissipation=0.4163202 static_friction=0.8
            dynamic_friction=0.8 viscous_friction=0
    HuntCrossleyForce Foot_Ground_R2: transition_velocity=0.1327498
      ContactParametersSet contact_parameters:
        ContactParameters: geometry=(ground right_two) stiffness=1.593302e7 dissipation=0.4163202 static_friction=0.8
            dynamic_friction=0.8 viscous_friction=0
    HuntCrossleyForce Foot_Ground_L2: transition_velocity=0.1327498
      ContactParametersSet contact_parameters:
        ContactParameters: geometry=(ground left_two) stiffness=1.593302e7 dissipation=0.4163202 static_friction=0.8
            dynamic_friction=0.8 viscous_friction=0
    HuntCrossleyForce Foot_Ground_R3: transition_velocity=0.1327498
      ContactParametersSet contact_parameters:
        ContactParameters: geometry=(ground right_three) stiffness=1.474053e7 dissipation=0.4163202 static_friction=0.8
            dynamic_friction=0.8 viscous_friction=0
    HuntCrossleyForce Foot_Ground_L3: transition_velocity=0.1327498
      ContactParametersSet contact_parameters:
        ContactParameters: geometry=(ground left_three) stiffness=1.474053e7 dissipation=0.4163202 static_friction=0.8
            dynamic_friction=0.8 viscous_friction=0
    HuntCrossleyForce Foot_Ground_R4: transition_velocity=0.1327498
      ContactParametersSet contact_parameters:
        ContactParameters: geometry=(ground right_four) stiffness=1.552861e7 dissipation=0.4163202 static_friction=0.8
            dynamic_friction=0.8 viscous_friction=0
    HuntCrossleyForce Foot_Ground_L4: transition_velocity=0.1327498
      ContactParametersSet contact_parameters:
        ContactParameters: geometry=(ground left_four) stiffness=1.552861e7 dissipation=0.4163202 static_friction=0.8
            dynamic_friction=0.8 viscous_friction=0
    HuntCrossleyForce Foot_Ground_R5: transition_velocity=0.1327498
      ContactParametersSet contact_parameters:
        ContactParameters: geometry=(ground right_five) stiffness=1.663769e7 dissipation=0.4163202 static_friction=0.8
            dynamic_friction=0.8 viscous_friction=0
    HuntCrossleyForce Foot_Ground_L5: transition_velocity=0.1327498
      ContactParametersSet contact_parameters:
        ContactParameters: geometry=(ground left_five) stiffness=1.663769e7 dissipation=0.4163202 static_friction=0.8
            dynamic_friction=0.8 viscous_friction=0
    HuntCrossleyForce Foot_Ground_R6: transition_velocity=0.1327498
      ContactParametersSet contact_parameters:
        ContactParameters: geometry=(ground right_six) stiffness=1.498419e7 dissipation=0.4163202 static_friction=0.8
            dynamic_friction=0.8 viscous_friction=0
    HuntCrossleyForce Foot_Ground_L6: transition_velocity=0.1327498
      ContactParametersSet contact_parameters:
        ContactParameters: geometry=(ground left_six) stiffness=1.498419e7 dissipation=0.4163202 static_friction=0.8
            dynamic_friction=0.8 viscous_friction=0
    HuntCrossleyForce Foot_Ground_R7: transition_velocity=0.1327498
      ContactParametersSet contact_parameters:
        ContactParameters: geometry=(ground right_seven) stiffness=1.630601e7 dissipation=0.4163202 static_friction=0.8
            dynamic_friction=0.8 viscous_friction=0
    HuntCrossleyForce Foot_Ground_L7: transition_velocity=0.1327498
      ContactParametersSet contact_parameters:
        ContactParameters: geometry=(ground left_seven) stiffness=1.630601e7 dissipation=0.4163202 static_friction=0.8
            dynamic_friction=0.8 viscous_friction=0
    HuntCrossleyForce Foot_Ground_R8: transition_velocity=0.1327498
      ContactParametersSet contact_parameters:
        ContactParameters: geometry=(ground right_eight) stiffness=1.617878e7 dissipation=0.4163202 static_friction=0.8
            dynamic_friction=0.8 viscous_friction=0
    HuntCrossleyForce Foot_Ground_L8: transition_velocity=0.1327498
      ContactParametersSet contact_parameters:
        ContactParameters: geometry=(ground left_eight) stiffness=1.617878e7 dissipation=0.4163202 static_friction=0.8
            dynamic_friction=0.8 viscous_friction=0
    ObjectGroup R_hip_abd: members=(glut_max1_r glut_med1_r glut_med2_r glut_med3_r glut_min1_r glut_min2_r glut_min3_r peri_r sar_r tfl_r)
    ObjectGroup R_hip_flex: members=(add_brev_r add_long_r glut_med1_r glut_min1_r grac_r iliacus_r pect_r psoas_r rect_fem_r sar_r tfl_r)
    ObjectGroup R_hip_inrot: members=(glut_med1_r glut_min1_r iliacus_r psoas_r tfl_r)
    ObjectGroup R_hip_exrot: members=(gem_r glut_med3_r glut_min3_r peri_r quad_fem_r)
    ObjectGroup R_hip_ext: members=(add_long_r add_mag1_r add_mag2_r add_mag3_r bifemlh_r glut_max1_r glut_max2_r glut_max3_r glut_med3_r glut_min3_r semimem_r semiten_r)
    ObjectGroup R_hip_add: members=(add_brev_r add_long_r add_mag1_r add_mag2_r add_mag3_r bifemlh_r grac_r pect_r semimem_r semiten_r)
    ObjectGroup R_knee_bend: members=(bifemlh_r bifemsh_r grac_r lat_gas_r med_gas_r sar_r semimem_r semiten_r)
    ObjectGroup R_knee_ext: members=(rect_fem_r vas_int_r vas_lat_r vas_med_r)
    ObjectGroup R_ankle_pf: members=(flex_dig_r flex_hal_r lat_gas_r med_gas_r per_brev_r per_long_r soleus_r tib_post_r)
    ObjectGroup R_inverter: members=(ext_hal_r flex_dig_r flex_hal_r tib_ant_r tib_post_r)
    ObjectGroup R_ankle_df: members=(ext_dig_r ext_hal_r per_tert_r tib_ant_r)
    ObjectGroup R_everter: members=(ext_dig_r per_brev_r per_long_r per_tert_r)
    ObjectGroup L_hip_abd: members=(glut_max1_l glut_med1_l glut_med2_l glut_med3_l glut_min1_l glut_min2_l glut_min3_l peri_l sar_l tfl_l)
    ObjectGroup L_hip_flex: members=(add_brev_l add_long_l glut_med1_l glut_min1_l grac_l iliacus_l pect_l psoas_l rect_fem_l sar_l tfl_l)
    ObjectGroup L_hip_inrot: members=(glut_med1_l glut_min1_l iliacus_l psoas_l tfl_l)
    ObjectGroup L_hip_exrot: members=(gem_l glut_med3_l glut_min3_l peri_l quad_fem_l)
    ObjectGroup L_hip_ext: members=(add_long_l add_mag1_l add_mag2_l add_mag3_l bifemlh_l glut_max1_l glut_max2_l glut_max3_l glut_med3_l glut_min3_l semimem_l semiten_l)
    ObjectGroup L_hip_add: members=(add_brev_l add_long_l add_mag1_l add_mag2_l add_mag3_l bifemlh_l grac_l pect_l semimem_l semiten_l)
    ObjectGroup L_knee_bend: members=(bifemlh_l bifemsh_l grac_l lat_gas_l med_gas_l sar_l semimem_l semiten_l)
    ObjectGroup L_knee_ext: members=(rect_fem_l vas_int_l vas_lat_l vas_med_l)
    ObjectGroup L_ankle_pf: members=(flex_dig_l flex_hal_l lat_gas_l med_gas_l per_brev_l per_long_l soleus_l tib_post_l)
    ObjectGroup L_inverter: members=(ext_hal_l flex_dig_l flex_hal_l tib_ant_l tib_post_l)
    ObjectGroup L_ankle_df: members=(ext_dig_l ext_hal_l per_tert_l tib_ant_l)
    ObjectGroup L_everter: members=(ext_dig_l per_brev_l per_long_l per_tert_l)
    ObjectGroup back_ext: members=(ercspn_l ercspn_r)
    ObjectGroup back_rlb: members=(ercspn_r extobl_r intobl_r)
    ObjectGroup back_introt: members=(ercspn_r extobl_l intobl_r)
    ObjectGroup back_llb: members=(ercspn_l extobl_l intobl_l)
    ObjectGroup back_extrot: members=(ercspn_l extobl_r intobl_l)
    ObjectGroup back_flex: members=(extobl_l extobl_r intobl_l intobl_r)
  MarkerSet:
    Marker CP_RCPM: calcn_r (0 -0.02 -0.03) fixed=true
    Marker CP_RCPL: calcn_r (0 -0.02 0.03) fixed=true
    Marker CP_RCAM: calcn_r (0.15 -0.02 -0.03) fixed=true
    Marker CP_RCAL: calcn_r (0.15 -0.02 0.03) fixed=true
    Marker CP_RTPM: toes_r (0 -0.018 -0.03) fixed=true
    Marker CP_RTPL: toes_r (0 -0.018 0.03) fixed=true
    Marker CP_RTAM: toes_r (0.05 -0.018 -0.03) fixed=true
    Marker CP_RTAL: toes_r (0.05 -0.018 0.03) fixed=true
    Marker CP_LCPM: calcn_l (0 -0.02 0.03) fixed=true
    Marker CP_LCPL: calcn_l (0 -0.02 -0.03) fixed=true
    Marker CP_LCAM: calcn_l (0.15 -0.02 0.03) fixed=true
    Marker CP_LCAL: calcn_l (0.15 -0.02 -0.03) fixed=true
    Marker CP_LTPM: toes_l (0 -0.018 0.03) fixed=true
    Marker CP_LTPL: toes_l (0 -0.018 -0.03) fixed=true
    Marker CP_LTAM: toes_l (0.05 -0.018 0.03) fixed=true
    Marker CP_LTAL: toes_l (0.05 -0.018 -0.03) fixed=true
    Marker STRN: torso (0.118677 0.25884 -0.00395959)
    Marker RSHO: torso (-0.00792224 0.485388 0.16658)
    Marker LSHO: torso (0.0012914 0.503554 -0.166947)
    Marker C7: torso (-0.0405052 0.491721 0.000293491)
    Marker CLAV: torso (0.0930161 0.408968 -1.24912e-5)
    Marker RUPA: humerus_r (0.0170662 -0.14173 0.0349179)
    Marker RELB: humerus_r (0.0152299 -0.274448 0.0310107)
    Marker RFRA: ulna_r (-0.0244699 -0.0744526 0.0329819)
    Marker RWRB: radius_r (-0.0426324 -0.241451 -0.00367371)
    Marker RWBA: radius_r (-0.0140836 -0.251502 0.072031)
    Marker LUPA: humerus_l (0.0158481 -0.0780511 -0.0646028)
    Marker LELB: humerus_l (0.0131475 -0.270943 -0.0346053)
    Marker LFRA: ulna_l (-0.0373877 -0.123453 -0.0224037)
    Marker LWRE: radius_l (-0.0395308 -0.233506 0.00606415)
    Marker LWRA: radius_l (-0.00943855 -0.236121 -0.0645278)
    Marker RASI: pelvis (0.0212898 0.00950465 0.12163)
    Marker LASI: pelvis (0.0201222 0.0118587 -0.117626)
    Marker SACR: pelvis (-0.173206 0.0233147 -0.00306274)
    Marker TRO: femur_r (0.0139289 -0.0190326 0.116076)
    Marker KneL: femur_r (-0.00497411 -0.468543 0.0738779)
    Marker KneM: femur_r (-0.00577508 -0.466941 -0.0409429)
    Marker AnkL: tibia_r (-0.0196002 -0.484244 0.053894)
    Marker AnkM: tibia_r (0.00109396 -0.466952 -0.0399077)
    Marker Hee: calcn_r (-0.0316238 0.0499572 -0.00778763)
    Marker Toe2: toes_r (0.0533103 0.0266551 0.00888505) fixed=true
    Marker MFL: calcn_r (0.0933669 0.0307352 0.0561129)
    Marker MFM: calcn_r (0.107866 0.0336312 -0.0526373)
    Marker ToeL: toes_r (-0.003743 0.00676926 0.05763)
    Marker ToeM: toes_r (0.0116475 0.016714 -0.0450025)
    Marker LTRO: femur_l (0.00514413 -0.0235324 -0.108191)
    Marker LKneL: femur_l (-0.00862103 -0.466618 -0.0704465)
    Marker LKneM: femur_l (-0.00620532 -0.469949 0.0452917)
    Marker LAnkL: tibia_l (-0.0110887 -0.481429 -0.0552465)
    Marker LAnkM: tibia_l (0.00531002 -0.451651 0.0372707)
    Marker LHee: calcn_l (-0.0321176 0.0496709 0.0136211)
    Marker LToe2: toes_l (0.0533103 0.0266551 -0.00888505) fixed=true
    Marker LMFL: calcn_l (0.101273 0.0344704 -0.0533705)
    Marker LMFM: calcn_l (0.105467 0.0324716 0.0513158)
    Marker LToeL: toes_l (0 0 -0.0621953) fixed=true
    Marker LToeM: toes_l (0.00888505 0.0177701 0.0444252) fixed=true
    Marker LPat: femur_l (0.0574751 -0.452193 -0.0228244)
    Marker Pat: femur_r (0.0588106 -0.453552 0.0170488)
    Marker CalL: calcn_r (0.0404717 0.0149205 0.0503874)
    Marker CalM: calcn_r (0.0391915 0.0243148 -0.0566816)
    Marker LCalL: calcn_l (0.0399163 0.0132633 -0.0496523)
    Marker LCalM: calcn_l (0.034997 0.0215868 0.0554724)
  ContactGeometrySet:
    ContactHalfSpace ground: socket_frame=/ground location=(0 0 0) orientation=(0 0 -1.5708)
    ContactSphere right_one: socket_frame=/bodyset/calcn_r location=(0.01 -0.01 -0.02) orientation=(1 0 0)
        radius=0.0465
    ContactSphere left_one: socket_frame=/bodyset/calcn_l location=(0.01 -0.01 0.02) orientation=(1 0 0) radius=0.0465
    ContactSphere right_two: socket_frame=/bodyset/calcn_r location=(0.16 -0.01 -0.035) orientation=(1 0 0)
        radius=0.0398
    ContactSphere left_two: socket_frame=/bodyset/calcn_l location=(0.16 -0.01 0.035) orientation=(1 0 0) radius=0.0398
    ContactSphere right_three: socket_frame=/bodyset/calcn_r location=(0.01 -0.01 0.0075) orientation=(1 0 0)
        radius=0.0465
    ContactSphere left_three: socket_frame=/bodyset/calcn_l location=(0.01 -0.01 -0.0075) orientation=(1 0 0)
        radius=0.0465
    ContactSphere right_four: socket_frame=/bodyset/calcn_r location=(0.125 -0.01 0.05) orientation=(1 0 0)
        radius=0.0419
    ContactSphere left_four: socket_frame=/bodyset/calcn_l location=(0.125 -0.01 -0.05) orientation=(1 0 0)
        radius=0.0419
    ContactSphere right_five: socket_frame=/bodyset/toes_r location=(0.07 -0.008 0.01) orientation=(1 0 0)
        radius=0.0365
    ContactSphere left_five: socket_frame=/bodyset/toes_l location=(0.07 -0.008 -0.01) orientation=(1 0 0)
        radius=0.0365
    ContactSphere right_six: socket_frame=/bodyset/calcn_r location=(0.075 -0.01 -0.00175) orientation=(1 0 0)
        radius=0.045
    ContactSphere left_six: socket_frame=/bodyset/calcn_l location=(0.075 -0.01 0.00175) orientation=(1 0 0)
        radius=0.045
    ContactSphere right_seven: socket_frame=/bodyset/toes_r location=(0.035 -0.008 -0.02) orientation=(1 0 0)
        radius=0.038
    ContactSphere left_seven: socket_frame=/bodyset/toes_l location=(0.035 -0.008 0.02) orientation=(1 0 0)
        radius=0.038
    ContactSphere right_eight: socket_frame=/bodyset/toes_r location=(0.02 -0.008 0.03) orientation=(1 0 0)
        radius=0.0386
    ContactSphere left_eight: socket_frame=/bodyset/toes_l location=(0.02 -0.008 -0.03) orientation=(1 0 0)
        radius=0.0386
